// SBML level 3 version 1

model main()
  // model units - substance: substance, time: second, volume: volume, area: area, length: metre, extent: substance

  // Compartments:
  compartment c = 1 volume; c is "Cytoplasm";
  compartment e; e has volume; e is "Extracellular";

  // Species:
  // FORMULA: C21H26N7O14P2
  // CHARGE: -1
  species $M_cpd00003_c in c = 1; M_cpd00003_c is "NAD";
  // FORMULA: C21H27N7O14P2
  // CHARGE: -2
  species $M_cpd00004_c in c = 1; M_cpd00004_c is "NADH";
  // FORMULA: H
  // CHARGE: 1
  species $M_cpd00067_c in c = 1; M_cpd00067_c is "H+";
  // FORMULA: H2O
  // CHARGE: 0
  species $M_cpd00001_c in c = 1; M_cpd00001_c is "H2O";
  // FORMULA: C21H26N7O17P3
  // CHARGE: -2
  species $M_cpd00006_c in c = 1; M_cpd00006_c is "NADP";
  // FORMULA: C21H27N7O17P3
  // CHARGE: -3
  species $M_cpd00005_c in c = 1; M_cpd00005_c is "NADPH";
  // FORMULA: C21H33N7O16P3S
  // CHARGE: -3
  species $M_cpd00010_c in c = 1; M_cpd00010_c is "CoA";
  // FORMULA: C23H35N7O17P3S
  // CHARGE: -3
  species $M_cpd00022_c in c = 1; M_cpd00022_c is "Acetyl-CoA";
  // FORMULA: HO4P
  // CHARGE: -2
  species $M_cpd00009_c in c = 1; M_cpd00009_c is "Phosphate";
  // FORMULA: C2H3O2
  // CHARGE: -1
  species $M_cpd00029_c in c = 1; M_cpd00029_c is "Acetate";
  // FORMULA: C17H25N3O17P2
  // CHARGE: -2
  species $M_cpd00175_c in c = 1; M_cpd00175_c is "UDP-N-acetyl-D-galactosamine";
  // FORMULA: C17H25N3O16P2
  // CHARGE: 0
  species $M_cpd17092_c in c = 1; M_cpd17092_c is "UDP-N-acetyl fucosamine";
  // FORMULA: C20H28N3O19P2
  // CHARGE: -3
  species $M_cpd00773_c in c = 1; M_cpd00773_c is "UDP-MurNAc";
  // FORMULA: C20H26N3O19P2
  // CHARGE: -3
  species $M_cpd02820_c in c = 1; M_cpd02820_c is "UDP-N-acetylglucosamine enolpyruvate";
  // FORMULA: H2O7P2
  // CHARGE: -2
  species $M_cpd00012_c in c = 1; M_cpd00012_c is "PPi";
  // FORMULA: C11H21N2O7PRS
  // CHARGE: -1
  species $M_cpd11493_c in c = 1; M_cpd11493_c is "ACP";
  // FORMULA: C13H23N2O8PRS
  // CHARGE: -1
  species $M_cpd11494_c in c = 1; M_cpd11494_c is "Acetyl-ACP";
  // FORMULA: C3H3O6P
  // CHARGE: -2
  species $M_cpd00061_c in c = 1; M_cpd00061_c is "Phosphoenolpyruvate";
  // FORMULA: C17H27O17N4P2
  // CHARGE: 0
  species $M_cpd17094_c in c = 1; M_cpd17094_c is "UDP-N-acetyl-D-mannosamine (2NAc3N) acid";
  // FORMULA: C19H29O18N4P2
  // CHARGE: 0
  species $M_cpd17095_c in c = 1; M_cpd17095_c is "UDP-N-acetyl-D-manosamine (2NAc3NAc) acid";
  // FORMULA: C8H15NO9P
  // CHARGE: -1
  species $M_cpd00293_c in c = 1; M_cpd00293_c is "N-Acetyl-D-glucosamine 6-phosphate";
  // FORMULA: C9H12N2O15P3
  // CHARGE: -3
  species $M_cpd00062_c in c = 1; M_cpd00062_c is "UTP";
  // FORMULA: C17H25N3O17P2
  // CHARGE: -2
  species $M_cpd00037_c in c = 1; M_cpd00037_c is "UDP-N-acetylglucosamine";
  // FORMULA: C6H14NO8P
  // CHARGE: 0
  species $M_cpd00288_c in c = 1; M_cpd00288_c is "D-Glucosamine phosphate";
  // FORMULA: C6H14NO8P
  // CHARGE: 0
  species $M_cpd03671_c in c = 1; M_cpd03671_c is "D-Glucosamine1-phosphate";
  // FORMULA: C8H15NO9P
  // CHARGE: -1
  species $M_cpd02611_c in c = 1; M_cpd02611_c is "N-Acetyl-D-glucosamine1-phosphate";

  // Parameters:
  LOWER_BOUND_rJB00277 = -1000;
  UPPER_BOUND_rJB00277 = 1000;
  LOWER_BOUND_rxn02285 = -1000;
  UPPER_BOUND_rxn02285 = 1000;
  LOWER_BOUND_rxn13913 = -1000;
  UPPER_BOUND_rxn13913 = 1000;
  LOWER_BOUND_rxn00295 = -1000;
  UPPER_BOUND_rxn00295 = 1000;
  LOWER_BOUND_rxn01484 = -1000;
  UPPER_BOUND_rxn01484 = 1000;
  LOWER_BOUND_rxn00461 = -1000;
  UPPER_BOUND_rxn00461 = 1000;
  LOWER_BOUND_rxn01485 = -1000;
  UPPER_BOUND_rxn01485 = 1000;
  LOWER_BOUND_rxn03638 = 0;
  UPPER_BOUND_rxn03638 = 1000;
  LOWER_BOUND_rxn00293 = -1000;
  UPPER_BOUND_rxn00293 = 1000;

  // Rate rules:
  M_cpd00004_c' = 9;
  M_cpd00003_c' = -9;
  M_cpd02611_c' = 1;
  M_cpd00012_c' = 1;
  M_cpd00293_c' = -5;
  M_cpd00022_c' = -2;
  M_cpd03671_c' = -5;
  M_cpd00006_c' = -8;
  M_cpd00010_c' = 2;
  M_cpd00175_c' = -3;
  M_cpd00061_c' = -4;
  M_cpd00001_c' = 4;
  M_cpd17095_c' = 7;
  M_cpd11494_c' = -7;
  M_cpd00288_c' = 8;
  M_cpd00005_c' = 8;
  M_cpd00062_c' = -1;
  M_cpd00009_c' = 4;
  M_cpd17094_c' = -7;
  M_cpd00037_c' = -9;
  M_cpd00029_c' = 5;
  M_cpd17092_c' = 9;
  M_cpd00067_c' = 5;
  M_cpd00773_c' = -8;
  M_cpd11493_c' = 7;
  M_cpd02820_c' = 12;

  // Reactions:
  // GENE_ASSOCIATION: (PA3158 and PA3146)
  // SUBSYSTEM: Amino sugar and nucleotide sugar metabolism
  // Confidence Level:
  // AUTHORS:
  R_rJB00277: $M_cpd00003_c + $M_cpd00067_c + $M_cpd00175_c -> $M_cpd00004_c + $M_cpd00001_c + $M_cpd17092_c; (vmaf_R_rJB00277*(M_cpd00003_c*c/kmc_R_rJB00277_M_cpd00003_c)^hco_R_rJB00277*(M_cpd00067_c*c/kmc_R_rJB00277_M_cpd00067_c)^hco_R_rJB00277*(M_cpd00175_c*c/kmc_R_rJB00277_M_cpd00175_c)^hco_R_rJB00277 - vmar_R_rJB00277*(M_cpd00004_c*c/kmc_R_rJB00277_M_cpd00004_c)^hco_R_rJB00277*(M_cpd00001_c*c/kmc_R_rJB00277_M_cpd00001_c)^hco_R_rJB00277*(M_cpd17092_c*c/kmc_R_rJB00277_M_cpd17092_c)^hco_R_rJB00277)/((1 + M_cpd00003_c*c/kmc_R_rJB00277_M_cpd00003_c)^hco_R_rJB00277*(1 + M_cpd00067_c*c/kmc_R_rJB00277_M_cpd00067_c)^hco_R_rJB00277*(1 + M_cpd00175_c*c/kmc_R_rJB00277_M_cpd00175_c)^hco_R_rJB00277 + (1 + M_cpd00004_c*c/kmc_R_rJB00277_M_cpd00004_c)^hco_R_rJB00277*(1 + M_cpd00001_c*c/kmc_R_rJB00277_M_cpd00001_c)^hco_R_rJB00277*(1 + M_cpd17092_c*c/kmc_R_rJB00277_M_cpd17092_c)^hco_R_rJB00277 - 1); R_rJB00277 is "UDP-N-acetyl fucosamine synthase";
    vmaf_R_rJB00277 = 1 mole_per_second; hco_R_rJB00277 = 1 dimensionless; kmc_R_rJB00277_M_cpd00003_c = 1 substance; kmc_R_rJB00277_M_cpd00067_c = 1 substance; kmc_R_rJB00277_M_cpd00175_c = 1 substance; vmar_R_rJB00277 = 1 mole_per_second; kmc_R_rJB00277_M_cpd00004_c = 1 substance; kmc_R_rJB00277_M_cpd00001_c = 1 substance; kmc_R_rJB00277_M_cpd17092_c = 1 substance;
  // GENE_ASSOCIATION: PA2977
  // SUBSYSTEM: Amino sugar and nucleotide sugar metabolism
  // EC Number: 1.1.1.158
  // Confidence Level:
  // AUTHORS:
  R_rxn02285: $M_cpd00006_c + $M_cpd00773_c -> $M_cpd00067_c + $M_cpd00005_c + $M_cpd02820_c; (vmaf_R_rxn02285*(M_cpd00006_c*c/kmc_R_rxn02285_M_cpd00006_c)^hco_R_rxn02285*(M_cpd00773_c*c/kmc_R_rxn02285_M_cpd00773_c)^hco_R_rxn02285 - vmar_R_rxn02285*(M_cpd00067_c*c/kmc_R_rxn02285_M_cpd00067_c)^hco_R_rxn02285*(M_cpd00005_c*c/kmc_R_rxn02285_M_cpd00005_c)^hco_R_rxn02285*(M_cpd02820_c*c/kmc_R_rxn02285_M_cpd02820_c)^hco_R_rxn02285)/((1 + M_cpd00006_c*c/kmc_R_rxn02285_M_cpd00006_c)^hco_R_rxn02285*(1 + M_cpd00773_c*c/kmc_R_rxn02285_M_cpd00773_c)^hco_R_rxn02285 + (1 + M_cpd00067_c*c/kmc_R_rxn02285_M_cpd00067_c)^hco_R_rxn02285*(1 + M_cpd00005_c*c/kmc_R_rxn02285_M_cpd00005_c)^hco_R_rxn02285*(1 + M_cpd02820_c*c/kmc_R_rxn02285_M_cpd02820_c)^hco_R_rxn02285 - 1); R_rxn02285 is "UDP-N-acetylenolpyruvoylglucosamine reductase";  // hasProperty ec-code:1.1.1.158
    vmaf_R_rxn02285 = 1 mole_per_second; hco_R_rxn02285 = 1 dimensionless; kmc_R_rxn02285_M_cpd00006_c = 1 substance; kmc_R_rxn02285_M_cpd00773_c = 1 substance; vmar_R_rxn02285 = 1 mole_per_second; kmc_R_rxn02285_M_cpd00067_c = 1 substance; kmc_R_rxn02285_M_cpd00005_c = 1 substance; kmc_R_rxn02285_M_cpd02820_c = 1 substance;
  // Reversibel rapid-equilibrium random order ternary-complex mechanism, two products
  // GENE_ASSOCIATION: (PA3157 or PA3156)
  // SUBSYSTEM: Amino sugar and nucleotide sugar metabolism
  // Confidence Level:
  // AUTHORS:
  R_rxn13913: $M_cpd11494_c + $M_cpd17094_c -> $M_cpd11493_c + $M_cpd17095_c; (vmaf_R_rxn13913/(kic_R_rxn13913_M_cpd11494_c*kmc_R_rxn13913_M_cpd17094_c)*M_cpd11494_c*c*M_cpd17094_c*c - vmar_R_rxn13913/(kic_R_rxn13913_M_cpd17095_c*kmc_R_rxn13913_M_cpd11493_c)*M_cpd11493_c*c*M_cpd17095_c*c)/(1 + M_cpd11494_c*c*M_cpd17094_c*c/(kic_R_rxn13913_M_cpd11494_c*kmc_R_rxn13913_M_cpd17094_c) + M_cpd11494_c*c/kic_R_rxn13913_M_cpd11494_c + M_cpd11493_c*c*M_cpd17095_c*c/(kic_R_rxn13913_M_cpd17095_c*kmc_R_rxn13913_M_cpd11493_c) + M_cpd17094_c*c/kic_R_rxn13913_M_cpd17094_c + M_cpd17095_c*c/kic_R_rxn13913_M_cpd17095_c + M_cpd11493_c*c/kic_R_rxn13913_M_cpd11493_c); R_rxn13913 is "UDP-N-acetyl-mannosamine (2NAc3N) acid acetylase";
    vmaf_R_rxn13913 = 1 mole_per_second; vmar_R_rxn13913 = 1 mole_per_second; kmc_R_rxn13913_M_cpd17094_c = 1 substance; kmc_R_rxn13913_M_cpd11493_c = 1 substance; kic_R_rxn13913_M_cpd11493_c = 1 substance; kic_R_rxn13913_M_cpd17095_c = 1 substance; kic_R_rxn13913_M_cpd11494_c = 1 substance; kic_R_rxn13913_M_cpd17094_c = 1 substance;
  // GENE_ASSOCIATION: PA3141
  // SUBSYSTEM: Amino sugar and nucleotide sugar metabolism
  // EC Number: 5.1.3.7
  // Confidence Level:
  // AUTHORS:
  R_rxn00295: $M_cpd00037_c -> $M_cpd00175_c; (vmaf_R_rxn00295/kmc_R_rxn00295_M_cpd00037_c*M_cpd00037_c*c - vmar_R_rxn00295/kmc_R_rxn00295_M_cpd00175_c*M_cpd00175_c*c)/(1 substance + M_cpd00037_c*c/kmc_R_rxn00295_M_cpd00037_c + M_cpd00175_c*c/kmc_R_rxn00295_M_cpd00175_c); R_rxn00295 is "UDP-N-acetylglucosamine 4-epimerase";  // hasProperty ec-code:5.1.3.7
    vmaf_R_rxn00295 = 1 mole_per_second; kmc_R_rxn00295_M_cpd00037_c = 1 substance; vmar_R_rxn00295 = 1 mole_per_second; kmc_R_rxn00295_M_cpd00175_c = 1 substance;
  // Reversibel rapid-equilibrium random order ternary-complex mechanism, two products
  // GENE_ASSOCIATION: PA3758
  // SUBSYSTEM: Amino sugar and nucleotide sugar metabolism
  // EC Number: 3.5.1.25
  // Confidence Level:
  // AUTHORS:
  R_rxn01484: $M_cpd00001_c + $M_cpd00293_c -> $M_cpd00029_c + $M_cpd00288_c; (vmaf_R_rxn01484/(kic_R_rxn01484_M_cpd00001_c*kmc_R_rxn01484_M_cpd00293_c)*M_cpd00001_c*c*M_cpd00293_c*c - vmar_R_rxn01484/(kic_R_rxn01484_M_cpd00288_c*kmc_R_rxn01484_M_cpd00029_c)*M_cpd00029_c*c*M_cpd00288_c*c)/(1 + M_cpd00001_c*c*M_cpd00293_c*c/(kic_R_rxn01484_M_cpd00001_c*kmc_R_rxn01484_M_cpd00293_c) + M_cpd00001_c*c/kic_R_rxn01484_M_cpd00001_c + M_cpd00029_c*c*M_cpd00288_c*c/(kic_R_rxn01484_M_cpd00288_c*kmc_R_rxn01484_M_cpd00029_c) + M_cpd00293_c*c/kic_R_rxn01484_M_cpd00293_c + M_cpd00288_c*c/kic_R_rxn01484_M_cpd00288_c + M_cpd00029_c*c/kic_R_rxn01484_M_cpd00029_c); R_rxn01484 is "N-acetylglucosamine-6-phosphate deacetylase";  // hasProperty ec-code:3.5.1.25
    vmaf_R_rxn01484 = 1 mole_per_second; vmar_R_rxn01484 = 1 mole_per_second; kmc_R_rxn01484_M_cpd00293_c = 1 substance; kmc_R_rxn01484_M_cpd00029_c = 1 substance; kic_R_rxn01484_M_cpd00029_c = 1 substance; kic_R_rxn01484_M_cpd00288_c = 1 substance; kic_R_rxn01484_M_cpd00001_c = 1 substance; kic_R_rxn01484_M_cpd00293_c = 1 substance;
  // GENE_ASSOCIATION: PA4450
  // SUBSYSTEM: Amino sugar and nucleotide sugar metabolism
  // EC Number: 2.5.1.7
  // Confidence Level:
  // AUTHORS:
  R_rxn00461: $M_cpd00061_c + $M_cpd00037_c -> $M_cpd00067_c + $M_cpd00009_c + $M_cpd02820_c; (vmaf_R_rxn00461*(M_cpd00061_c*c/kmc_R_rxn00461_M_cpd00061_c)^hco_R_rxn00461*(M_cpd00037_c*c/kmc_R_rxn00461_M_cpd00037_c)^hco_R_rxn00461 - vmar_R_rxn00461*(M_cpd00067_c*c/kmc_R_rxn00461_M_cpd00067_c)^hco_R_rxn00461*(M_cpd00009_c*c/kmc_R_rxn00461_M_cpd00009_c)^hco_R_rxn00461*(M_cpd02820_c*c/kmc_R_rxn00461_M_cpd02820_c)^hco_R_rxn00461)/((1 + M_cpd00061_c*c/kmc_R_rxn00461_M_cpd00061_c)^hco_R_rxn00461*(1 + M_cpd00037_c*c/kmc_R_rxn00461_M_cpd00037_c)^hco_R_rxn00461 + (1 + M_cpd00067_c*c/kmc_R_rxn00461_M_cpd00067_c)^hco_R_rxn00461*(1 + M_cpd00009_c*c/kmc_R_rxn00461_M_cpd00009_c)^hco_R_rxn00461*(1 + M_cpd02820_c*c/kmc_R_rxn00461_M_cpd02820_c)^hco_R_rxn00461 - 1); R_rxn00461 is "UDP-N-acetylglucosamine 1-carboxyvinyltransferase";  // hasProperty ec-code:2.5.1.7
    vmaf_R_rxn00461 = 1 mole_per_second; hco_R_rxn00461 = 1 dimensionless; kmc_R_rxn00461_M_cpd00061_c = 1 substance; kmc_R_rxn00461_M_cpd00037_c = 1 substance; vmar_R_rxn00461 = 1 mole_per_second; kmc_R_rxn00461_M_cpd00067_c = 1 substance; kmc_R_rxn00461_M_cpd00009_c = 1 substance; kmc_R_rxn00461_M_cpd02820_c = 1 substance;
  // GENE_ASSOCIATION: PA4749
  // SUBSYSTEM: Amino sugar and nucleotide sugar metabolism
  // EC Number: 5.4.2.10,5.4.2.2
  // Confidence Level:
  // AUTHORS:
  R_rxn01485: $M_cpd03671_c -> $M_cpd00288_c; (vmaf_R_rxn01485/kmc_R_rxn01485_M_cpd03671_c*M_cpd03671_c*c - vmar_R_rxn01485/kmc_R_rxn01485_M_cpd00288_c*M_cpd00288_c*c)/(1 substance + M_cpd03671_c*c/kmc_R_rxn01485_M_cpd03671_c + M_cpd00288_c*c/kmc_R_rxn01485_M_cpd00288_c); R_rxn01485 is "phosphoglucosamine mutase";  // hasProperty ec-code:5.4.2.10 ec-code:5.4.2.2
    vmaf_R_rxn01485 = 1 mole_per_second; kmc_R_rxn01485_M_cpd03671_c = 1 substance; vmar_R_rxn01485 = 1 mole_per_second; kmc_R_rxn01485_M_cpd00288_c = 1 substance;
  // Convenience kinetics
  // GENE_ASSOCIATION: PA5552
  // SUBSYSTEM: Amino sugar and nucleotide sugar metabolism
  // EC Number: 2.3.1.157,2.3.1.4
  // Confidence Level:
  // AUTHORS:
  R_rxn03638: $M_cpd00022_c + $M_cpd03671_c => $M_cpd00067_c + $M_cpd00010_c + $M_cpd02611_c; vmax_R_rxn03638*(M_cpd00022_c*c/kmc_R_rxn03638_M_cpd00022_c)*(M_cpd03671_c*c/kmc_R_rxn03638_M_cpd03671_c)/((1 + M_cpd00022_c*c/kmc_R_rxn03638_M_cpd00022_c)*(1 + M_cpd03671_c*c/kmc_R_rxn03638_M_cpd03671_c)); R_rxn03638 is "glucosamine-1-phosphate N-acetyltransferase";  // hasProperty ec-code:2.3.1.157 ec-code:2.3.1.4
    vmax_R_rxn03638 = 1 mole_per_second; kmc_R_rxn03638_M_cpd00022_c = 1 substance; kmc_R_rxn03638_M_cpd03671_c = 1 substance;
  // Reversibel rapid-equilibrium random order ternary-complex mechanism, two products
  // GENE_ASSOCIATION: PA5552
  // SUBSYSTEM: Amino sugar and nucleotide sugar metabolism
  // EC Number: 2.7.7.23
  // Confidence Level:
  // AUTHORS:
  R_rxn00293: $M_cpd00062_c + $M_cpd02611_c -> $M_cpd00012_c + $M_cpd00037_c; (vmaf_R_rxn00293/(kic_R_rxn00293_M_cpd00062_c*kmc_R_rxn00293_M_cpd02611_c)*M_cpd00062_c*c*M_cpd02611_c*c - vmar_R_rxn00293/(kic_R_rxn00293_M_cpd00037_c*kmc_R_rxn00293_M_cpd00012_c)*M_cpd00012_c*c*M_cpd00037_c*c)/(1 + M_cpd00062_c*c*M_cpd02611_c*c/(kic_R_rxn00293_M_cpd00062_c*kmc_R_rxn00293_M_cpd02611_c) + M_cpd00062_c*c/kic_R_rxn00293_M_cpd00062_c + M_cpd00012_c*c*M_cpd00037_c*c/(kic_R_rxn00293_M_cpd00037_c*kmc_R_rxn00293_M_cpd00012_c) + M_cpd02611_c*c/kic_R_rxn00293_M_cpd02611_c + M_cpd00037_c*c/kic_R_rxn00293_M_cpd00037_c + M_cpd00012_c*c/kic_R_rxn00293_M_cpd00012_c); R_rxn00293 is "UDP-N-acetylglucosamine diphosphorylase";  // hasProperty ec-code:2.7.7.23
    vmaf_R_rxn00293 = 1 mole_per_second; vmar_R_rxn00293 = 1 mole_per_second; kmc_R_rxn00293_M_cpd02611_c = 1 substance; kmc_R_rxn00293_M_cpd00012_c = 1 substance; kic_R_rxn00293_M_cpd00012_c = 1 substance; kic_R_rxn00293_M_cpd00037_c = 1 substance; kic_R_rxn00293_M_cpd00062_c = 1 substance; kic_R_rxn00293_M_cpd02611_c = 1 substance;

  // Unit definitions:
  unit mmol_per_gDW_per_hr = 1e-3 mole / (gram * 2.777778e-4 second);
  unit volume = litre;
  unit substance = mole;
  unit area = metre^2;
  unit mole_per_second = mole / second;
end
