// SBML level 3 version 1

model main()
  // model units - substance: substance, time: second, volume: volume, area: area, length: metre, extent: substance

  // Compartments:
  compartment c = 1 volume; c is "Cytoplasm";
  compartment e; e has volume; e is "Extracellular";

  // Species:
  // FORMULA: H
  // CHARGE: 1
  species $M_cpd00067_c in c = 1; M_cpd00067_c is "H+";
  // FORMULA: H2O
  // CHARGE: 0
  species $M_cpd00001_c in c = 1; M_cpd00001_c is "H2O";
  // FORMULA: HO4P
  // CHARGE: -2
  species $M_cpd00009_c in c = 1; M_cpd00009_c is "Phosphate";
  // FORMULA: C2H3O2
  // CHARGE: -1
  species $M_cpd00029_c in c = 1; M_cpd00029_c is "Acetate";
  // FORMULA: C5H10O8P
  // CHARGE: -1
  species $M_cpd00171_c in c = 1; M_cpd00171_c is "D-Ribulose5-phosphate";
  // FORMULA: C23H43N2O8PRS
  // CHARGE: -1
  species $M_cpd11468_c in c = 1; M_cpd11468_c is "Dodecanoyl-ACP";
  // FORMULA: C21H39N2O9PRS
  // CHARGE: -1
  species $M_cpd11482_c in c = 1; M_cpd11482_c is "(R)-3-Hydroxydecanoyl-[acyl-carrier protein]";
  // FORMULA: C23H43N2O9PRS
  // CHARGE: -1
  species $M_cpd11480_c in c = 1; M_cpd11480_c is "D-3-Hydroxydodecanoyl-[acp]";
  // FORMULA: C10H13N5O13P3
  // CHARGE: -3
  species $M_cpd00002_c in c = 1; M_cpd00002_c is "ATP";
  // FORMULA: C10H13N5O10P2
  // CHARGE: -2
  species $M_cpd00008_c in c = 1; M_cpd00008_c is "ADP";
  // FORMULA: C17H25N3O16P2
  // CHARGE: 0
  species $M_cpd17092_c in c = 1; M_cpd17092_c is "UDP-N-acetyl fucosamine";
  // FORMULA: C15H22N2O17P2
  // CHARGE: -2
  species $M_cpd00026_c in c = 1; M_cpd00026_c is "UDP-glucose";
  // FORMULA: H4N
  // CHARGE: 1
  species $M_cpd00013_c in c = 1; M_cpd00013_c is "NH3";
  // FORMULA: H2O7P2
  // CHARGE: -2
  species $M_cpd00012_c in c = 1; M_cpd00012_c is "PPi";
  // FORMULA: C16H24N2O15P2
  // CHARGE: -2
  species $M_cpd02113_c in c = 1; M_cpd02113_c is "dTDP-rhamnose";
  // FORMULA: C16H23N5O15P2
  // CHARGE: -2
  species $M_cpd01999_c in c = 1; M_cpd01999_c is "GDP-D-rhamnose";
  // FORMULA: C11H21N2O7PRS
  // CHARGE: -1
  species $M_cpd11493_c in c = 1; M_cpd11493_c is "ACP";
  // FORMULA: C9H13N3O14P3
  // CHARGE: -3
  species $M_cpd00052_c in c = 1; M_cpd00052_c is "CTP";
  // FORMULA: C12H23O2X
  // CHARGE: 0
  species $M_cpd17046_c in c = 1; M_cpd17046_c is "2-hydroxydodecanoyl-[acyl-carrier protein]";
  // FORMULA: C56H102N2O23P2
  // CHARGE: 0
  species $M_cpd17068_c in c = 1; M_cpd17068_c is "Pseudomonas aeruginosa Lipid A precursor";
  // FORMULA: C80H146N2O25P2
  // CHARGE: 0
  species $M_cpd17066_c in c = 1; M_cpd17066_c is "Pseudomonas aeruginosa Lipid A";
  // FORMULA: C3H7NO2
  // CHARGE: 0
  species $M_cpd00035_c in c = 1; M_cpd00035_c is "L-Alanine";
  // FORMULA: C9H12N2O12P2
  // CHARGE: -2
  species $M_cpd00014_c in c = 1; M_cpd00014_c is "UDP";
  // FORMULA: C3H3O6P
  // CHARGE: -2
  species $M_cpd00061_c in c = 1; M_cpd00061_c is "Phosphoenolpyruvate";
  // FORMULA: C9H13N3O8P
  // CHARGE: -1
  species $M_cpd00046_c in c = 1; M_cpd00046_c is "CMP";
  // FORMULA: C15H22N2O17P2
  // CHARGE: -2
  species $M_cpd00043_c in c = 1; M_cpd00043_c is "UDP-galactose";
  // FORMULA: C81H137O28N5P4
  // CHARGE: 0
  species $M_cpd17100_c in c = 1; M_cpd17100_c is "Man(2NAc3N)(3,-CH3C=NH)A-(beta1,4)-Man(2NAc3NAc)A-(beta1,3)-Fuc2NAc-PP-Undecaprenyl";
  // FORMULA: C156H274N4O95P5
  // CHARGE: 0
  species $M_cpd17065_c in c = 1; M_cpd17065_c is "Pseudomonas aeruginosa LPS core + KDO2-lipidA";
  // FORMULA: C55H90O7P2
  // CHARGE: -2
  species $M_cpd02229_c in c = 1; M_cpd02229_c is "Bactoprenyl diphosphate";
  // FORMULA: C182H322O116N9P7
  // CHARGE: 0
  species $M_cpd17057_c in c = 1; M_cpd17057_c is "Pseudomonas aeruginosa B-band lipopolysaccharide";
  // FORMULA: C17H27O17N4P2
  // CHARGE: 0
  species $M_cpd17094_c in c = 1; M_cpd17094_c is "UDP-N-acetyl-D-mannosamine (2NAc3N) acid";
  // FORMULA: C19H29O18N4P2
  // CHARGE: 0
  species $M_cpd17095_c in c = 1; M_cpd17095_c is "UDP-N-acetyl-D-manosamine (2NAc3NAc) acid";
  // FORMULA: CH3NO5P
  // CHARGE: -1
  species $M_cpd00146_c in c = 1; M_cpd00146_c is "Carbamoylphosphate";
  // FORMULA: C9H12N2O9P
  // CHARGE: -1
  species $M_cpd00091_c in c = 1; M_cpd00091_c is "UMP";
  // FORMULA: C152H271N2O84P2
  // CHARGE: 0
  species $M_cpd17063_c in c = 1; M_cpd17063_c is "PA_core6_lipidA";
  // FORMULA: C152H268N2O93P5
  // CHARGE: 0
  species $M_cpd17064_c in c = 1; M_cpd17064_c is "PA_core7_lipidA";
  // FORMULA: C55H90O4P
  // CHARGE: -1
  species $M_cpd00286_c in c = 1; M_cpd00286_c is "Undecaprenylphosphate";
  // FORMULA: C7H14O13P2
  // CHARGE: -2
  species $M_cpd08316_c in c = 1; M_cpd08316_c is "D-Glycero-D-manno-heptose1-7-bisphosphate";
  // FORMULA: C7H14O10P
  // CHARGE: -1
  species $M_cpd04920_c in c = 1; M_cpd04920_c is "D-Glycero-D-manno-heptose1-phosphate";
  // FORMULA: C7H14O10P
  // CHARGE: -1
  species $M_cpd00238_c in c = 1; M_cpd00238_c is "Sedoheptulose7-phosphate";
  // FORMULA: C10H14N2O11P2
  // CHARGE: -2
  species $M_cpd00297_c in c = 1; M_cpd00297_c is "dTDP";
  // FORMULA: C37H63N3O20P2
  // CHARGE: 0
  species $M_cpd17070_c in c = 1; M_cpd17070_c is "UDP-2-NH-(3OH-C12:0),3-O-(3OH-C10:0)glucosamine";
  // FORMULA: C28H52NO12P
  // CHARGE: 0
  species $M_cpd17069_c in c = 1; M_cpd17069_c is "Pseudomonas aeruginosa Lipid X";
  // FORMULA: C9H12N2O15P3
  // CHARGE: -3
  species $M_cpd00062_c in c = 1; M_cpd00062_c is "UTP";
  // FORMULA: C6H12O9P
  // CHARGE: -1
  species $M_cpd00089_c in c = 1; M_cpd00089_c is "Glucose-1-phosphate";
  // FORMULA: C8H13O8
  // CHARGE: -1
  species $M_cpd00875_c in c = 1; M_cpd00875_c is "KDO";
  // FORMULA: C17H24N3O15P
  // CHARGE: -2
  species $M_cpd02546_c in c = 1; M_cpd02546_c is "CMP-KDO";
  // FORMULA: C56H103N2O20P
  // CHARGE: 0
  species $M_cpd17067_c in c = 1; M_cpd17067_c is "Pseudomonas Lipid A Disaccharide";
  // FORMULA: C17H25N3O17P2
  // CHARGE: -2
  species $M_cpd00037_c in c = 1; M_cpd00037_c is "UDP-N-acetylglucosamine";
  // FORMULA: C63H103O11N1P2
  // CHARGE: 0
  species $M_cpd17098_c in c = 1; M_cpd17098_c is "Fuc2NAc-PP-Undecaprenyl";
  // FORMULA: C63H103NO12P2
  // CHARGE: -2
  species $M_cpd00946_c in c = 1; M_cpd00946_c is "Undecaprenyl diphospho N-acetyl-glucosamine";
  // FORMULA: C17H27O17N4P2
  // CHARGE: 0
  species $M_cpd17093_c in c = 1; M_cpd17093_c is "UDP-N-acetyl-D-mannosamine (2NAc(CH3C=NH)) acid";
  // FORMULA: C71H119O19N3P3
  // CHARGE: 0
  species $M_cpd17099_c in c = 1; M_cpd17099_c is "Man(2NAc3NAc)A-(beta1,3)-Fuc2NAc-PP-Undecaprenyl";
  // FORMULA: C17H25N3O17P2
  // CHARGE: -2
  species $M_cpd00861_c in c = 1; M_cpd00861_c is "UDP-N-acetyl-D-mannosamine";
  // FORMULA: C17H28O17N4P2
  // CHARGE: 0
  species $M_cpd17096_c in c = 1; M_cpd17096_c is "UDP-N-acetyl-D-mannosamine-3-N";
  // FORMULA: C17H25N5O16P2
  // CHARGE: -2
  species $M_cpd03830_c in c = 1; M_cpd03830_c is "ADP-D-glycero-D-manno-heptose";
  // FORMULA: C17H25N5O16P2
  // CHARGE: -2
  species $M_cpd03831_c in c = 1; M_cpd03831_c is "ADP-L-glycero-D-manno-heptose";
  // FORMULA: C10H13N5O8P
  // CHARGE: -1
  species $M_cpd00126_c in c = 1; M_cpd00126_c is "GMP";
  // FORMULA: C5H10O8P
  // CHARGE: -1
  species $M_cpd00817_c in c = 1; M_cpd00817_c is "D-Arabinose5-phosphate";
  // FORMULA: C8H13O11P
  // CHARGE: -2
  species $M_cpd02730_c in c = 1; M_cpd02730_c is "3-Deoxy-D-manno-octulosonate8-phosphate";
  // FORMULA: C27H43N3O19P2
  // CHARGE: 0
  species $M_cpd17071_c in c = 1; M_cpd17071_c is "UDP-3-O-(3OH-C10:0)-N-acetylglucosamine";
  // FORMULA: C25H42N3O18P2
  // CHARGE: 0
  species $M_cpd17072_c in c = 1; M_cpd17072_c is "UDP-3-O-(3OH-C10:0)-D-glucosamine";
  // FORMULA: C7H14O10P
  // CHARGE: -1
  species $M_cpd04918_c in c = 1; M_cpd04918_c is "D-Glycero-D-manno-heptose7-phosphate";
  // FORMULA: C88H157N2O32P2
  // CHARGE: 0
  species $M_cpd17055_c in c = 1; M_cpd17055_c is "Pseudomonas aeruginosa KDO-lipidA";
  // FORMULA: C96H168N2O39P2
  // CHARGE: 0
  species $M_cpd17054_c in c = 1; M_cpd17054_c is "Pseudomonas aeruginosa KDO2-lipidA";
  // FORMULA: C116H205N2O56P2
  // CHARGE: 0
  species $M_cpd17060_c in c = 1; M_cpd17060_c is "PA_core3_lipidA";
  // FORMULA: C134H238N2O71P2
  // CHARGE: 0
  species $M_cpd17061_c in c = 1; M_cpd17061_c is "PA_core4_lipidA";
  // FORMULA: C110H194N2O51P2
  // CHARGE: 0
  species $M_cpd17059_c in c = 1; M_cpd17059_c is "PA_core2_lipidA";
  // FORMULA: C146H260N2O79P2
  // CHARGE: 0
  species $M_cpd17062_c in c = 1; M_cpd17062_c is "PA_core5_lipidA";
  // FORMULA: C103H181N2O45P2
  // CHARGE: 0
  species $M_cpd17058_c in c = 1; M_cpd17058_c is "PA_core1_lipidA";
  // FORMULA: C70H117P3O18N4
  // CHARGE: 0
  species $M_cpd17086_c in c = 1; M_cpd17086_c is "rha1glcnacppund";
  // FORMULA: C82H143P5O32N4
  // CHARGE: 0
  species $M_cpd17087_c in c = 1; M_cpd17087_c is "rha3glcnacppund";
  // FORMULA: C88H156P6O39N4
  // CHARGE: 0
  species $M_cpd17088_c in c = 1; M_cpd17088_c is "rha4glcnacppund";
  // FORMULA: C189H341P9O127N8
  // CHARGE: 0
  species $M_cpd17056_c in c = 1; M_cpd17056_c is "Pseudomonas aeruginosa A-band lipopolysaccharide";

  // Parameters:
  LOWER_BOUND_rxn13872 = -1000;
  UPPER_BOUND_rxn13872 = 1000;
  LOWER_BOUND_rxn13877 = -1000;
  UPPER_BOUND_rxn13877 = 1000;
  LOWER_BOUND_rxn13870 = 0;
  UPPER_BOUND_rxn13870 = 1000;
  LOWER_BOUND_rxn03919 = 0;
  UPPER_BOUND_rxn03919 = 1000;
  LOWER_BOUND_rxn13884 = -1000;
  UPPER_BOUND_rxn13884 = 1000;
  LOWER_BOUND_rxn00213 = -1000;
  UPPER_BOUND_rxn00213 = 1000;
  LOWER_BOUND_rxn02405 = 0;
  UPPER_BOUND_rxn02405 = 1000;
  LOWER_BOUND_rxn13880 = -1000;
  UPPER_BOUND_rxn13880 = 1000;
  LOWER_BOUND_rxn13833 = -1000;
  UPPER_BOUND_rxn13833 = 1000;
  LOWER_BOUND_rxn08040 = -1000;
  UPPER_BOUND_rxn08040 = 1000;
  LOWER_BOUND_rxn13922 = -1000;
  UPPER_BOUND_rxn13922 = 1000;
  LOWER_BOUND_rxn00297 = -1000;
  UPPER_BOUND_rxn00297 = 1000;
  LOWER_BOUND_rxn13923 = -1000;
  UPPER_BOUND_rxn13923 = 1000;
  LOWER_BOUND_rxn13912 = -1000;
  UPPER_BOUND_rxn13912 = 1000;
  LOWER_BOUND_rxn13911 = -1000;
  UPPER_BOUND_rxn13911 = 1000;
  LOWER_BOUND_rxn13873 = -1000;
  UPPER_BOUND_rxn13873 = 1000;
  LOWER_BOUND_rxn03511 = 0;
  UPPER_BOUND_rxn03511 = 1000;
  LOWER_BOUND_rxn02331 = 0;
  UPPER_BOUND_rxn02331 = 1000;
  LOWER_BOUND_rxn13874 = -1000;
  UPPER_BOUND_rxn13874 = 1000;
  LOWER_BOUND_rxn13882 = -1000;
  UPPER_BOUND_rxn13882 = 1000;
  LOWER_BOUND_rxn13881 = -1000;
  UPPER_BOUND_rxn13881 = 1000;
  LOWER_BOUND_rxn13883 = -1000;
  UPPER_BOUND_rxn13883 = 1000;
  LOWER_BOUND_rxn03917 = -1000;
  UPPER_BOUND_rxn03917 = 1000;
  LOWER_BOUND_rxn01117 = -1000;
  UPPER_BOUND_rxn01117 = 1000;
  LOWER_BOUND_rxn02404 = 0;
  UPPER_BOUND_rxn02404 = 1000;
  LOWER_BOUND_rxn13878 = -1000;
  UPPER_BOUND_rxn13878 = 1000;
  LOWER_BOUND_rxn13879 = -1000;
  UPPER_BOUND_rxn13879 = 1000;
  LOWER_BOUND_rxn03916 = -1000;
  UPPER_BOUND_rxn03916 = 1000;
  LOWER_BOUND_rxn03918 = -1000;
  UPPER_BOUND_rxn03918 = 1000;
  LOWER_BOUND_rxn13867 = 0;
  UPPER_BOUND_rxn13867 = 1000;
  LOWER_BOUND_rxn13866 = 0;
  UPPER_BOUND_rxn13866 = 1000;
  LOWER_BOUND_rxn13869 = 0;
  UPPER_BOUND_rxn13869 = 1000;
  LOWER_BOUND_rPY00222 = 0;
  UPPER_BOUND_rPY00222 = 1000;
  LOWER_BOUND_rPY00221 = 0;
  UPPER_BOUND_rPY00221 = 1000;
  LOWER_BOUND_rxn13899 = 0;
  UPPER_BOUND_rxn13899 = 1000;
  LOWER_BOUND_rxn13900 = 0;
  UPPER_BOUND_rxn13900 = 1000;
  LOWER_BOUND_rxn13901 = 0;
  UPPER_BOUND_rxn13901 = 1000;
  LOWER_BOUND_rxn13868 = 0;
  UPPER_BOUND_rxn13868 = 1000;
  LOWER_BOUND_rxn13876 = 0;
  UPPER_BOUND_rxn13876 = 1000;
  LOWER_BOUND_rxn13871 = 0;
  UPPER_BOUND_rxn13871 = 1000;
  LOWER_BOUND_rxn13926 = 0;
  UPPER_BOUND_rxn13926 = 1000;
  kG_M_cpd00002_c = 1 dimensionless; kG_M_cpd00002_c is "Energy constant of species ATP";
  kG_M_cpd17063_c = 1 dimensionless; kG_M_cpd17063_c is "Energy constant of species PA_core6_lipidA";
  kG_M_cpd00067_c = 1 dimensionless; kG_M_cpd00067_c is "Energy constant of species H+";
  kG_M_cpd00008_c = 1 dimensionless; kG_M_cpd00008_c is "Energy constant of species ADP";
  kG_M_cpd17064_c = 1 dimensionless; kG_M_cpd17064_c is "Energy constant of species PA_core7_lipidA";
  kG_M_cpd00001_c = 1 dimensionless; kG_M_cpd00001_c is "Energy constant of species H2O";
  kG_M_cpd08316_c = 1 dimensionless; kG_M_cpd08316_c is "Energy constant of species D-Glycero-D-manno-heptose1-7-bisphosphate";
  kG_M_cpd00009_c = 1 dimensionless; kG_M_cpd00009_c is "Energy constant of species Phosphate";
  kG_M_cpd04920_c = 1 dimensionless; kG_M_cpd04920_c is "Energy constant of species D-Glycero-D-manno-heptose1-phosphate";
  kG_M_cpd00061_c = 1 dimensionless; kG_M_cpd00061_c is "Energy constant of species Phosphoenolpyruvate";
  kG_M_cpd00817_c = 1 dimensionless; kG_M_cpd00817_c is "Energy constant of species D-Arabinose5-phosphate";
  kG_M_cpd02730_c = 1 dimensionless; kG_M_cpd02730_c is "Energy constant of species 3-Deoxy-D-manno-octulosonate8-phosphate";
  kG_M_cpd00875_c = 1 dimensionless; kG_M_cpd00875_c is "Energy constant of species KDO";
  kG_M_cpd00026_c = 1 dimensionless; kG_M_cpd00026_c is "Energy constant of species UDP-glucose";
  kG_M_cpd17060_c = 1 dimensionless; kG_M_cpd17060_c is "Energy constant of species PA_core3_lipidA";
  kG_M_cpd00014_c = 1 dimensionless; kG_M_cpd00014_c is "Energy constant of species UDP";
  kG_M_cpd17061_c = 1 dimensionless; kG_M_cpd17061_c is "Energy constant of species PA_core4_lipidA";
  kG_M_cpd01999_c = 1 dimensionless; kG_M_cpd01999_c is "Energy constant of species GDP-D-rhamnose";
  kG_M_cpd17086_c = 1 dimensionless; kG_M_cpd17086_c is "Energy constant of species rha1glcnacppund";
  kG_M_cpd00126_c = 1 dimensionless; kG_M_cpd00126_c is "Energy constant of species GMP";
  kG_M_cpd17087_c = 1 dimensionless; kG_M_cpd17087_c is "Energy constant of species rha3glcnacppund";
  kG_M_cpd02113_c = 1 dimensionless; kG_M_cpd02113_c is "Energy constant of species dTDP-rhamnose";
  kG_M_cpd00297_c = 1 dimensionless; kG_M_cpd00297_c is "Energy constant of species dTDP";
  kG_M_cpd17062_c = 1 dimensionless; kG_M_cpd17062_c is "Energy constant of species PA_core5_lipidA";
  kG_M_cpd00035_c = 1 dimensionless; kG_M_cpd00035_c is "Energy constant of species L-Alanine";
  kG_M_cpd00146_c = 1 dimensionless; kG_M_cpd00146_c is "Energy constant of species Carbamoylphosphate";
  kG_M_cpd17065_c = 1 dimensionless; kG_M_cpd17065_c is "Energy constant of species Pseudomonas aeruginosa LPS core + KDO2-lipidA";

  // Rate rules:
  M_cpd00026_c' = -10;
  M_cpd00052_c' = -35;
  M_cpd00091_c' = 169;
  M_cpd17057_c' = 40;
  M_cpd17065_c' = -41;
  M_cpd17093_c' = -30;
  M_cpd00012_c' = 85;
  M_cpd11480_c' = -21;
  M_cpd00043_c' = -11;
  M_cpd17046_c' = -41;
  M_cpd11493_c' = 177;
  M_cpd17068_c' = -33;
  M_cpd00002_c' = -178;
  M_cpd17060_c' = -1;
  M_cpd17061_c' = 8;
  M_cpd00946_c' = 25;
  M_cpd17100_c' = -11;
  M_cpd00046_c' = 31;
  M_cpd17055_c' = 1;
  M_cpd04918_c' = 6;
  M_cpd17066_c' = 51;
  M_cpd17064_c' = 37;
  M_cpd00061_c' = -24;
  M_cpd11468_c' = -93;
  M_cpd17062_c' = -6;
  M_cpd00126_c' = 17;
  M_cpd00146_c' = -2;
  M_cpd17071_c' = 2;
  M_cpd17058_c' = 1;
  M_cpd17059_c' = -3;
  M_cpd00171_c' = 18;
  M_cpd17054_c' = 6;
  M_cpd00035_c' = -2;
  M_cpd11482_c' = -22;
  M_cpd17067_c' = -11;
  M_cpd17069_c' = 14;
  M_cpd17095_c' = -29;
  M_cpd03830_c' = -11;
  M_cpd02229_c' = 43;
  M_cpd04920_c' = 24;
  M_cpd00008_c' = 181;
  M_cpd02113_c' = -8;
  M_cpd00875_c' = -18;
  M_cpd00238_c' = -19;
  M_cpd01999_c' = -24;
  M_cpd17096_c' = 1;
  M_cpd00286_c' = -65;
  M_cpd00297_c' = 8;
  M_cpd00062_c' = -36;
  M_cpd00009_c' = 81;
  M_cpd17099_c' = 2;
  M_cpd02730_c' = 7;
  M_cpd00013_c' = -28;
  M_cpd17088_c' = 2;
  M_cpd02546_c' = 4;
  M_cpd17098_c' = 2;
  M_cpd17063_c' = -29;
  M_cpd03831_c' = 8;
  M_cpd00014_c' = 80;
  M_cpd00089_c' = -36;
  M_cpd17056_c' = 3;
  M_cpd17094_c' = 26;
  M_cpd17087_c' = 1;
  M_cpd00037_c' = -84;
  M_cpd00029_c' = 20;
  M_cpd17092_c' = -33;
  M_cpd00067_c' = 434;
  M_cpd00001_c' = -134;
  M_cpd00817_c' = -42;
  M_cpd17086_c' = 1;
  M_cpd00861_c' = 2;
  M_cpd08316_c' = -25;
  M_cpd17070_c' = -39;
  M_cpd17072_c' = -1;

  // Reactions:
  // GENE_ASSOCIATION: (PA0011 or PA3242)
  // SUBSYSTEM: Lipopolysaccharide biosynthesis
  // Confidence Level:
  // AUTHORS:
  R_rxn13872: $M_cpd11468_c + $M_cpd17046_c + $M_cpd17068_c -> 2 $M_cpd11493_c + $M_cpd17066_c; (vmaf_R_rxn13872*(M_cpd11468_c*c/kmc_R_rxn13872_M_cpd11468_c)^hco_R_rxn13872*(M_cpd17046_c*c/kmc_R_rxn13872_M_cpd17046_c)^hco_R_rxn13872*(M_cpd17068_c*c/kmc_R_rxn13872_M_cpd17068_c)^hco_R_rxn13872 - vmar_R_rxn13872*(M_cpd11493_c*c/kmc_R_rxn13872_M_cpd11493_c)^(2*hco_R_rxn13872)*(M_cpd17066_c*c/kmc_R_rxn13872_M_cpd17066_c)^hco_R_rxn13872)/((1 + M_cpd11468_c*c/kmc_R_rxn13872_M_cpd11468_c)^hco_R_rxn13872*(1 + M_cpd17046_c*c/kmc_R_rxn13872_M_cpd17046_c)^hco_R_rxn13872*(1 + M_cpd17068_c*c/kmc_R_rxn13872_M_cpd17068_c)^hco_R_rxn13872 + (1 + M_cpd11493_c*c/kmc_R_rxn13872_M_cpd11493_c)^(2*hco_R_rxn13872)*(1 + M_cpd17066_c*c/kmc_R_rxn13872_M_cpd17066_c)^hco_R_rxn13872 - 1); R_rxn13872 is "Pseudomonas Lipid A Reaction";
    vmaf_R_rxn13872 = 1 mole_per_second; hco_R_rxn13872 = 1 dimensionless; kmc_R_rxn13872_M_cpd11468_c = 1 substance; kmc_R_rxn13872_M_cpd17046_c = 1 substance; kmc_R_rxn13872_M_cpd17068_c = 1 substance; vmar_R_rxn13872 = 1 mole_per_second; kmc_R_rxn13872_M_cpd11493_c = 1 substance; kmc_R_rxn13872_M_cpd17066_c = 1 substance;
  // Reversibel rapid-equilibrium random order ternary-complex mechanism, two products
  // GENE_ASSOCIATION: (PA3153 and PA3154 and PA3160)
  // SUBSYSTEM: Lipopolysaccharide biosynthesis
  // Confidence Level:
  // AUTHORS:
  R_rxn13877: $M_cpd17100_c + $M_cpd17065_c -> $M_cpd02229_c + $M_cpd17057_c; (vmaf_R_rxn13877/(kic_R_rxn13877_M_cpd17100_c*kmc_R_rxn13877_M_cpd17065_c)*M_cpd17100_c*c*M_cpd17065_c*c - vmar_R_rxn13877/(kic_R_rxn13877_M_cpd17057_c*kmc_R_rxn13877_M_cpd02229_c)*M_cpd02229_c*c*M_cpd17057_c*c)/(1 + M_cpd17100_c*c*M_cpd17065_c*c/(kic_R_rxn13877_M_cpd17100_c*kmc_R_rxn13877_M_cpd17065_c) + M_cpd17100_c*c/kic_R_rxn13877_M_cpd17100_c + M_cpd02229_c*c*M_cpd17057_c*c/(kic_R_rxn13877_M_cpd17057_c*kmc_R_rxn13877_M_cpd02229_c) + M_cpd17065_c*c/kic_R_rxn13877_M_cpd17065_c + M_cpd17057_c*c/kic_R_rxn13877_M_cpd17057_c + M_cpd02229_c*c/kic_R_rxn13877_M_cpd02229_c); R_rxn13877 is "Pseudomonas aeruginosa LPS B band synthesis";
    vmaf_R_rxn13877 = 1 mole_per_second; vmar_R_rxn13877 = 1 mole_per_second; kmc_R_rxn13877_M_cpd17065_c = 1 substance; kmc_R_rxn13877_M_cpd02229_c = 1 substance; kic_R_rxn13877_M_cpd02229_c = 1 substance; kic_R_rxn13877_M_cpd17057_c = 1 substance; kic_R_rxn13877_M_cpd17100_c = 1 substance; kic_R_rxn13877_M_cpd17065_c = 1 substance;
  // Thermodynamically independent convenience kinetics
  // GENE_ASSOCIATION: (PA5009 and PA5008)
  // SUBSYSTEM: Lipopolysaccharide biosynthesis
  // Confidence Level:
  // AUTHORS:
  R_rxn13870: 3 $M_cpd00002_c + $M_cpd17063_c => 3 $M_cpd00067_c + 3 $M_cpd00008_c + $M_cpd17064_c; vmag_R_rxn13870*((M_cpd00002_c*c/kmc_R_rxn13870_M_cpd00002_c)^3*(M_cpd17063_c*c/kmc_R_rxn13870_M_cpd17063_c)*sqrt((kG_M_cpd00002_c*kmc_R_rxn13870_M_cpd00002_c)^3*(kG_M_cpd17063_c*kmc_R_rxn13870_M_cpd17063_c)^1/((kG_M_cpd00067_c*kmc_R_rxn13870_M_cpd00067_c)^3*(kG_M_cpd17064_c*kmc_R_rxn13870_M_cpd17064_c)^1*(kG_M_cpd00008_c*kmc_R_rxn13870_M_cpd00008_c)^3))/((1 + M_cpd00002_c*c/kmc_R_rxn13870_M_cpd00002_c + (M_cpd00002_c*c/kmc_R_rxn13870_M_cpd00002_c)^2 + (M_cpd00002_c*c/kmc_R_rxn13870_M_cpd00002_c)^3)*(1 + M_cpd17063_c*c/kmc_R_rxn13870_M_cpd17063_c))); R_rxn13870 is "Pseudomonas aeruginosa LPS lumped 2,4,and 6 heptokinases";
    kmc_R_rxn13870_M_cpd00002_c = 1 substance; kmc_R_rxn13870_M_cpd17063_c = 1 substance; kmc_R_rxn13870_M_cpd00067_c = 1 substance; kmc_R_rxn13870_M_cpd00008_c = 1 substance; kmc_R_rxn13870_M_cpd17064_c = 1 substance; vmag_R_rxn13870 = 1 mole_per_second;
  // Thermodynamically independent convenience kinetics
  // GENE_ASSOCIATION: PA0006
  // SUBSYSTEM: Lipopolysaccharide biosynthesis
  // EC Number: 3.1.-.-
  // Confidence Level:
  // AUTHORS:
  R_rxn03919: $M_cpd00001_c + $M_cpd08316_c => $M_cpd00067_c + $M_cpd00009_c + $M_cpd04920_c; vmag_R_rxn03919*(M_cpd00001_c*c/kmc_R_rxn03919_M_cpd00001_c*(M_cpd08316_c*c/kmc_R_rxn03919_M_cpd08316_c)*sqrt((kG_M_cpd00001_c*kmc_R_rxn03919_M_cpd00001_c)^1*(kG_M_cpd08316_c*kmc_R_rxn03919_M_cpd08316_c)^1/((kG_M_cpd00067_c*kmc_R_rxn03919_M_cpd00067_c)^1*(kG_M_cpd04920_c*kmc_R_rxn03919_M_cpd04920_c)^1*(kG_M_cpd00009_c*kmc_R_rxn03919_M_cpd00009_c)^1))/((1 + M_cpd00001_c*c/kmc_R_rxn03919_M_cpd00001_c)*(1 + M_cpd08316_c*c/kmc_R_rxn03919_M_cpd08316_c))); R_rxn03919 is "D-glycero-D-manno-heptose 1,7-bisphosphate phosphatase";  // hasProperty ec-code:3.1.-.-
    kmc_R_rxn03919_M_cpd00001_c = 1 substance; kmc_R_rxn03919_M_cpd08316_c = 1 substance; kmc_R_rxn03919_M_cpd00067_c = 1 substance; kmc_R_rxn03919_M_cpd00009_c = 1 substance; kmc_R_rxn03919_M_cpd04920_c = 1 substance; vmag_R_rxn03919 = 1 mole_per_second;
  // GENE_ASSOCIATION: PA1792
  // SUBSYSTEM: Lipopolysaccharide biosynthesis
  // Confidence Level:
  // AUTHORS:
  R_rxn13884: $M_cpd00001_c + $M_cpd17070_c -> 2 $M_cpd00067_c + $M_cpd00091_c + $M_cpd17069_c; (vmaf_R_rxn13884*(M_cpd00001_c*c/kmc_R_rxn13884_M_cpd00001_c)^hco_R_rxn13884*(M_cpd17070_c*c/kmc_R_rxn13884_M_cpd17070_c)^hco_R_rxn13884 - vmar_R_rxn13884*(M_cpd00067_c*c/kmc_R_rxn13884_M_cpd00067_c)^(2*hco_R_rxn13884)*(M_cpd00091_c*c/kmc_R_rxn13884_M_cpd00091_c)^hco_R_rxn13884*(M_cpd17069_c*c/kmc_R_rxn13884_M_cpd17069_c)^hco_R_rxn13884)/((1 + M_cpd00001_c*c/kmc_R_rxn13884_M_cpd00001_c)^hco_R_rxn13884*(1 + M_cpd17070_c*c/kmc_R_rxn13884_M_cpd17070_c)^hco_R_rxn13884 + (1 + M_cpd00067_c*c/kmc_R_rxn13884_M_cpd00067_c)^(2*hco_R_rxn13884)*(1 + M_cpd00091_c*c/kmc_R_rxn13884_M_cpd00091_c)^hco_R_rxn13884*(1 + M_cpd17069_c*c/kmc_R_rxn13884_M_cpd17069_c)^hco_R_rxn13884 - 1); R_rxn13884 is "UDP-diacyl-GlcN pyrophosphatase";
    vmaf_R_rxn13884 = 1 mole_per_second; hco_R_rxn13884 = 1 dimensionless; kmc_R_rxn13884_M_cpd00001_c = 1 substance; kmc_R_rxn13884_M_cpd17070_c = 1 substance; vmar_R_rxn13884 = 1 mole_per_second; kmc_R_rxn13884_M_cpd00067_c = 1 substance; kmc_R_rxn13884_M_cpd00091_c = 1 substance; kmc_R_rxn13884_M_cpd17069_c = 1 substance;
  // Reversibel rapid-equilibrium random order ternary-complex mechanism, two products
  // GENE_ASSOCIATION: PA2023
  // SUBSYSTEM: Lipopolysaccharide biosynthesis
  // Confidence Level:
  // AUTHORS:
  R_rxn00213: $M_cpd00062_c + $M_cpd00089_c -> $M_cpd00026_c + $M_cpd00012_c; (vmaf_R_rxn00213/(kic_R_rxn00213_M_cpd00062_c*kmc_R_rxn00213_M_cpd00089_c)*M_cpd00062_c*c*M_cpd00089_c*c - vmar_R_rxn00213/(kic_R_rxn00213_M_cpd00012_c*kmc_R_rxn00213_M_cpd00026_c)*M_cpd00026_c*c*M_cpd00012_c*c)/(1 + M_cpd00062_c*c*M_cpd00089_c*c/(kic_R_rxn00213_M_cpd00062_c*kmc_R_rxn00213_M_cpd00089_c) + M_cpd00062_c*c/kic_R_rxn00213_M_cpd00062_c + M_cpd00026_c*c*M_cpd00012_c*c/(kic_R_rxn00213_M_cpd00012_c*kmc_R_rxn00213_M_cpd00026_c) + M_cpd00089_c*c/kic_R_rxn00213_M_cpd00089_c + M_cpd00012_c*c/kic_R_rxn00213_M_cpd00012_c + M_cpd00026_c*c/kic_R_rxn00213_M_cpd00026_c); R_rxn00213 is "UTP-glucose-1-phosphate uridylyltransferase";
    vmaf_R_rxn00213 = 1 mole_per_second; vmar_R_rxn00213 = 1 mole_per_second; kmc_R_rxn00213_M_cpd00089_c = 1 substance; kmc_R_rxn00213_M_cpd00026_c = 1 substance; kic_R_rxn00213_M_cpd00026_c = 1 substance; kic_R_rxn00213_M_cpd00012_c = 1 substance; kic_R_rxn00213_M_cpd00062_c = 1 substance; kic_R_rxn00213_M_cpd00089_c = 1 substance;
  // Irreversibel rapid-equilibrium random order ternary-complex mechanism, two products
  // GENE_ASSOCIATION: PA2979
  // SUBSYSTEM: Lipopolysaccharide biosynthesis
  // EC Number: 2.7.7.38
  // Confidence Level:
  // AUTHORS:
  R_rxn02405: $M_cpd00052_c + $M_cpd00875_c => $M_cpd00012_c + $M_cpd02546_c; vmax_R_rxn02405*M_cpd00875_c*c*M_cpd00052_c*c/(kic_R_rxn02405_M_cpd00052_c*kmc_R_rxn02405_M_cpd00875_c + M_cpd00052_c*c*M_cpd00875_c*c + kmc_R_rxn02405_M_cpd00875_c*M_cpd00052_c*c + kmc_R_rxn02405_M_cpd00052_c*M_cpd00875_c*c); R_rxn02405 is "3-deoxy-manno-octulosonate cytidylyltransferase";  // hasProperty ec-code:2.7.7.38
    vmax_R_rxn02405 = 1 mole_per_second; kmc_R_rxn02405_M_cpd00052_c = 1 substance; kmc_R_rxn02405_M_cpd00875_c = 1 substance; kic_R_rxn02405_M_cpd00052_c = 1 substance;
  // GENE_ASSOCIATION: PA2981
  // SUBSYSTEM: Lipopolysaccharide biosynthesis
  // Confidence Level:
  // AUTHORS:
  R_rxn13880: $M_cpd00002_c + $M_cpd17067_c -> $M_cpd00067_c + $M_cpd00008_c + $M_cpd17068_c; (vmaf_R_rxn13880*(M_cpd00002_c*c/kmc_R_rxn13880_M_cpd00002_c)^hco_R_rxn13880*(M_cpd17067_c*c/kmc_R_rxn13880_M_cpd17067_c)^hco_R_rxn13880 - vmar_R_rxn13880*(M_cpd00067_c*c/kmc_R_rxn13880_M_cpd00067_c)^hco_R_rxn13880*(M_cpd00008_c*c/kmc_R_rxn13880_M_cpd00008_c)^hco_R_rxn13880*(M_cpd17068_c*c/kmc_R_rxn13880_M_cpd17068_c)^hco_R_rxn13880)/((1 + M_cpd00002_c*c/kmc_R_rxn13880_M_cpd00002_c)^hco_R_rxn13880*(1 + M_cpd17067_c*c/kmc_R_rxn13880_M_cpd17067_c)^hco_R_rxn13880 + (1 + M_cpd00067_c*c/kmc_R_rxn13880_M_cpd00067_c)^hco_R_rxn13880*(1 + M_cpd00008_c*c/kmc_R_rxn13880_M_cpd00008_c)^hco_R_rxn13880*(1 + M_cpd17068_c*c/kmc_R_rxn13880_M_cpd17068_c)^hco_R_rxn13880 - 1); R_rxn13880 is "Pseudomonas Tetraacyldisaccharide 4'kinase";
    vmaf_R_rxn13880 = 1 mole_per_second; hco_R_rxn13880 = 1 dimensionless; kmc_R_rxn13880_M_cpd00002_c = 1 substance; kmc_R_rxn13880_M_cpd17067_c = 1 substance; vmar_R_rxn13880 = 1 mole_per_second; kmc_R_rxn13880_M_cpd00067_c = 1 substance; kmc_R_rxn13880_M_cpd00008_c = 1 substance; kmc_R_rxn13880_M_cpd17068_c = 1 substance;
  // Reversibel rapid-equilibrium random order ternary-complex mechanism, two products
  // GENE_ASSOCIATION: PA3145
  // SUBSYSTEM: Lipopolysaccharide biosynthesis
  // Confidence Level:
  // AUTHORS:
  R_rxn13833: $M_cpd17092_c + $M_cpd00286_c -> $M_cpd00091_c + $M_cpd17098_c; (vmaf_R_rxn13833/(kic_R_rxn13833_M_cpd17092_c*kmc_R_rxn13833_M_cpd00286_c)*M_cpd17092_c*c*M_cpd00286_c*c - vmar_R_rxn13833/(kic_R_rxn13833_M_cpd17098_c*kmc_R_rxn13833_M_cpd00091_c)*M_cpd00091_c*c*M_cpd17098_c*c)/(1 + M_cpd17092_c*c*M_cpd00286_c*c/(kic_R_rxn13833_M_cpd17092_c*kmc_R_rxn13833_M_cpd00286_c) + M_cpd17092_c*c/kic_R_rxn13833_M_cpd17092_c + M_cpd00091_c*c*M_cpd17098_c*c/(kic_R_rxn13833_M_cpd17098_c*kmc_R_rxn13833_M_cpd00091_c) + M_cpd00286_c*c/kic_R_rxn13833_M_cpd00286_c + M_cpd17098_c*c/kic_R_rxn13833_M_cpd17098_c + M_cpd00091_c*c/kic_R_rxn13833_M_cpd00091_c); R_rxn13833 is "Fuc2NAc-PP-undecap synthesis";
    vmaf_R_rxn13833 = 1 mole_per_second; vmar_R_rxn13833 = 1 mole_per_second; kmc_R_rxn13833_M_cpd00286_c = 1 substance; kmc_R_rxn13833_M_cpd00091_c = 1 substance; kic_R_rxn13833_M_cpd00091_c = 1 substance; kic_R_rxn13833_M_cpd17098_c = 1 substance; kic_R_rxn13833_M_cpd17092_c = 1 substance; kic_R_rxn13833_M_cpd00286_c = 1 substance;
  // Reversibel rapid-equilibrium random order ternary-complex mechanism, two products
  // GENE_ASSOCIATION: PA3145
  // SUBSYSTEM: Lipopolysaccharide biosynthesis
  // EC Number: Undetermined
  // Confidence Level:
  // AUTHORS:
  R_rxn08040: $M_cpd00286_c + $M_cpd00037_c -> $M_cpd00091_c + $M_cpd00946_c; (vmaf_R_rxn08040/(kic_R_rxn08040_M_cpd00286_c*kmc_R_rxn08040_M_cpd00037_c)*M_cpd00286_c*c*M_cpd00037_c*c - vmar_R_rxn08040/(kic_R_rxn08040_M_cpd00946_c*kmc_R_rxn08040_M_cpd00091_c)*M_cpd00091_c*c*M_cpd00946_c*c)/(1 + M_cpd00286_c*c*M_cpd00037_c*c/(kic_R_rxn08040_M_cpd00286_c*kmc_R_rxn08040_M_cpd00037_c) + M_cpd00286_c*c/kic_R_rxn08040_M_cpd00286_c + M_cpd00091_c*c*M_cpd00946_c*c/(kic_R_rxn08040_M_cpd00946_c*kmc_R_rxn08040_M_cpd00091_c) + M_cpd00037_c*c/kic_R_rxn08040_M_cpd00037_c + M_cpd00946_c*c/kic_R_rxn08040_M_cpd00946_c + M_cpd00091_c*c/kic_R_rxn08040_M_cpd00091_c); R_rxn08040 is "GlcNac-pyrophosphorylundecaprenol synthesis";  // hasProperty ec-code:Undetermined
    vmaf_R_rxn08040 = 1 mole_per_second; vmar_R_rxn08040 = 1 mole_per_second; kmc_R_rxn08040_M_cpd00037_c = 1 substance; kmc_R_rxn08040_M_cpd00091_c = 1 substance; kic_R_rxn08040_M_cpd00091_c = 1 substance; kic_R_rxn08040_M_cpd00946_c = 1 substance; kic_R_rxn08040_M_cpd00286_c = 1 substance; kic_R_rxn08040_M_cpd00037_c = 1 substance;
  // Reversibel rapid-equilibrium random order ternary-complex mechanism, two products
  // GENE_ASSOCIATION: PA3147
  // SUBSYSTEM: Lipopolysaccharide biosynthesis
  // Confidence Level:
  // AUTHORS:
  R_rxn13922: $M_cpd17098_c + $M_cpd17093_c -> $M_cpd00091_c + $M_cpd17099_c; (vmaf_R_rxn13922/(kic_R_rxn13922_M_cpd17098_c*kmc_R_rxn13922_M_cpd17093_c)*M_cpd17098_c*c*M_cpd17093_c*c - vmar_R_rxn13922/(kic_R_rxn13922_M_cpd17099_c*kmc_R_rxn13922_M_cpd00091_c)*M_cpd00091_c*c*M_cpd17099_c*c)/(1 + M_cpd17098_c*c*M_cpd17093_c*c/(kic_R_rxn13922_M_cpd17098_c*kmc_R_rxn13922_M_cpd17093_c) + M_cpd17098_c*c/kic_R_rxn13922_M_cpd17098_c + M_cpd00091_c*c*M_cpd17099_c*c/(kic_R_rxn13922_M_cpd17099_c*kmc_R_rxn13922_M_cpd00091_c) + M_cpd17093_c*c/kic_R_rxn13922_M_cpd17093_c + M_cpd17099_c*c/kic_R_rxn13922_M_cpd17099_c + M_cpd00091_c*c/kic_R_rxn13922_M_cpd00091_c); R_rxn13922 is "Man(2NAc3NAc)A-(beta1,3)-Fuc2NAc-PP-undecap synthesis";
    vmaf_R_rxn13922 = 1 mole_per_second; vmar_R_rxn13922 = 1 mole_per_second; kmc_R_rxn13922_M_cpd17093_c = 1 substance; kmc_R_rxn13922_M_cpd00091_c = 1 substance; kic_R_rxn13922_M_cpd00091_c = 1 substance; kic_R_rxn13922_M_cpd17099_c = 1 substance; kic_R_rxn13922_M_cpd17098_c = 1 substance; kic_R_rxn13922_M_cpd17093_c = 1 substance;
  // GENE_ASSOCIATION: PA3148
  // SUBSYSTEM: Lipopolysaccharide biosynthesis
  // EC Number: 5.1.3.14
  // Confidence Level:
  // AUTHORS:
  R_rxn00297: $M_cpd00037_c -> $M_cpd00861_c; (vmaf_R_rxn00297/kmc_R_rxn00297_M_cpd00037_c*M_cpd00037_c*c - vmar_R_rxn00297/kmc_R_rxn00297_M_cpd00861_c*M_cpd00861_c*c)/(1 substance + M_cpd00037_c*c/kmc_R_rxn00297_M_cpd00037_c + M_cpd00861_c*c/kmc_R_rxn00297_M_cpd00861_c); R_rxn00297 is "UDP-N-acetylglucosamine 2-epimerase";  // hasProperty ec-code:5.1.3.14
    vmaf_R_rxn00297 = 1 mole_per_second; kmc_R_rxn00297_M_cpd00037_c = 1 substance; vmar_R_rxn00297 = 1 mole_per_second; kmc_R_rxn00297_M_cpd00861_c = 1 substance;
  // Reversibel rapid-equilibrium random order ternary-complex mechanism, two products
  // GENE_ASSOCIATION: PA3149
  // SUBSYSTEM: Lipopolysaccharide biosynthesis
  // Confidence Level:
  // AUTHORS:
  R_rxn13923: $M_cpd17095_c + $M_cpd17099_c -> $M_cpd17100_c + $M_cpd00091_c; (vmaf_R_rxn13923/(kic_R_rxn13923_M_cpd17095_c*kmc_R_rxn13923_M_cpd17099_c)*M_cpd17095_c*c*M_cpd17099_c*c - vmar_R_rxn13923/(kic_R_rxn13923_M_cpd00091_c*kmc_R_rxn13923_M_cpd17100_c)*M_cpd17100_c*c*M_cpd00091_c*c)/(1 + M_cpd17095_c*c*M_cpd17099_c*c/(kic_R_rxn13923_M_cpd17095_c*kmc_R_rxn13923_M_cpd17099_c) + M_cpd17095_c*c/kic_R_rxn13923_M_cpd17095_c + M_cpd17100_c*c*M_cpd00091_c*c/(kic_R_rxn13923_M_cpd00091_c*kmc_R_rxn13923_M_cpd17100_c) + M_cpd17099_c*c/kic_R_rxn13923_M_cpd17099_c + M_cpd00091_c*c/kic_R_rxn13923_M_cpd00091_c + M_cpd17100_c*c/kic_R_rxn13923_M_cpd17100_c); R_rxn13923 is "Man(2NAc3N)(3,-CH3C=NH)A-(beta1,4)-Man(2NAc3NAc)A-(beta1,3)-Fuc2NAc-PP-undecap synthesis";
    vmaf_R_rxn13923 = 1 mole_per_second; vmar_R_rxn13923 = 1 mole_per_second; kmc_R_rxn13923_M_cpd17099_c = 1 substance; kmc_R_rxn13923_M_cpd17100_c = 1 substance; kic_R_rxn13923_M_cpd17100_c = 1 substance; kic_R_rxn13923_M_cpd00091_c = 1 substance; kic_R_rxn13923_M_cpd17095_c = 1 substance; kic_R_rxn13923_M_cpd17099_c = 1 substance;
  // Reversibel rapid-equilibrium random order ternary-complex mechanism, two products
  // GENE_ASSOCIATION: PA3155
  // SUBSYSTEM: Lipopolysaccharide biosynthesis
  // Confidence Level:
  // AUTHORS:
  R_rxn13912: $M_cpd00013_c + $M_cpd00861_c -> $M_cpd00067_c + $M_cpd17096_c; (vmaf_R_rxn13912/(kic_R_rxn13912_M_cpd00013_c*kmc_R_rxn13912_M_cpd00861_c)*M_cpd00013_c*c*M_cpd00861_c*c - vmar_R_rxn13912/(kic_R_rxn13912_M_cpd17096_c*kmc_R_rxn13912_M_cpd00067_c)*M_cpd00067_c*c*M_cpd17096_c*c)/(1 + M_cpd00013_c*c*M_cpd00861_c*c/(kic_R_rxn13912_M_cpd00013_c*kmc_R_rxn13912_M_cpd00861_c) + M_cpd00013_c*c/kic_R_rxn13912_M_cpd00013_c + M_cpd00067_c*c*M_cpd17096_c*c/(kic_R_rxn13912_M_cpd17096_c*kmc_R_rxn13912_M_cpd00067_c) + M_cpd00861_c*c/kic_R_rxn13912_M_cpd00861_c + M_cpd17096_c*c/kic_R_rxn13912_M_cpd17096_c + M_cpd00067_c*c/kic_R_rxn13912_M_cpd00067_c); R_rxn13912 is "UDP-N-acetyl-mannosamine aminase";
    vmaf_R_rxn13912 = 1 mole_per_second; vmar_R_rxn13912 = 1 mole_per_second; kmc_R_rxn13912_M_cpd00861_c = 1 substance; kmc_R_rxn13912_M_cpd00067_c = 1 substance; kic_R_rxn13912_M_cpd00067_c = 1 substance; kic_R_rxn13912_M_cpd17096_c = 1 substance; kic_R_rxn13912_M_cpd00013_c = 1 substance; kic_R_rxn13912_M_cpd00861_c = 1 substance;
  // GENE_ASSOCIATION: PA3159
  // SUBSYSTEM: Lipopolysaccharide biosynthesis
  // Confidence Level:
  // AUTHORS:
  R_rxn13911: $M_cpd17096_c -> $M_cpd00067_c + $M_cpd17094_c; (vmaf_R_rxn13911*(M_cpd17096_c*c/kmc_R_rxn13911_M_cpd17096_c)^hco_R_rxn13911 - vmar_R_rxn13911*(M_cpd00067_c*c/kmc_R_rxn13911_M_cpd00067_c)^hco_R_rxn13911*(M_cpd17094_c*c/kmc_R_rxn13911_M_cpd17094_c)^hco_R_rxn13911)/((1 + M_cpd17096_c*c/kmc_R_rxn13911_M_cpd17096_c)^hco_R_rxn13911 + (1 + M_cpd00067_c*c/kmc_R_rxn13911_M_cpd00067_c)^hco_R_rxn13911*(1 + M_cpd17094_c*c/kmc_R_rxn13911_M_cpd17094_c)^hco_R_rxn13911 - 1); R_rxn13911 is "UDP-N-acetyl-mannosamine-3-N dehydrogenase";
    vmaf_R_rxn13911 = 1 mole_per_second; hco_R_rxn13911 = 1 dimensionless; kmc_R_rxn13911_M_cpd17096_c = 1 substance; vmar_R_rxn13911 = 1 mole_per_second; kmc_R_rxn13911_M_cpd00067_c = 1 substance; kmc_R_rxn13911_M_cpd17094_c = 1 substance;
  // GENE_ASSOCIATION: PA3242
  // SUBSYSTEM: Lipopolysaccharide biosynthesis
  // Confidence Level:
  // AUTHORS:
  R_rxn13873: 2 $M_cpd11468_c + $M_cpd17068_c -> 2 $M_cpd11493_c + $M_cpd17066_c; (vmaf_R_rxn13873*(M_cpd11468_c*c/kmc_R_rxn13873_M_cpd11468_c)^(2*hco_R_rxn13873)*(M_cpd17068_c*c/kmc_R_rxn13873_M_cpd17068_c)^hco_R_rxn13873 - vmar_R_rxn13873*(M_cpd11493_c*c/kmc_R_rxn13873_M_cpd11493_c)^(2*hco_R_rxn13873)*(M_cpd17066_c*c/kmc_R_rxn13873_M_cpd17066_c)^hco_R_rxn13873)/((1 + M_cpd11468_c*c/kmc_R_rxn13873_M_cpd11468_c)^(2*hco_R_rxn13873)*(1 + M_cpd17068_c*c/kmc_R_rxn13873_M_cpd17068_c)^hco_R_rxn13873 + (1 + M_cpd11493_c*c/kmc_R_rxn13873_M_cpd11493_c)^(2*hco_R_rxn13873)*(1 + M_cpd17066_c*c/kmc_R_rxn13873_M_cpd17066_c)^hco_R_rxn13873 - 1); R_rxn13873 is "Pseudomonas lipid A reaction 2";
    vmaf_R_rxn13873 = 1 mole_per_second; hco_R_rxn13873 = 1 dimensionless; kmc_R_rxn13873_M_cpd11468_c = 1 substance; kmc_R_rxn13873_M_cpd17068_c = 1 substance; vmar_R_rxn13873 = 1 mole_per_second; kmc_R_rxn13873_M_cpd11493_c = 1 substance; kmc_R_rxn13873_M_cpd17066_c = 1 substance;
  // GENE_ASSOCIATION: PA3337
  // SUBSYSTEM: Lipopolysaccharide biosynthesis
  // Confidence Level:
  // AUTHORS:
  R_rxn03511: $M_cpd03830_c => $M_cpd03831_c; vmax_R_rxn03511*M_cpd03830_c*c/(kmc_R_rxn03511_M_cpd03830_c + M_cpd03830_c*c); R_rxn03511 is "ADP-D-glycero-D-manno-heptose epimerase";
    vmax_R_rxn03511 = 1 mole_per_second; kmc_R_rxn03511_M_cpd03830_c = 1 substance;
  // Thermodynamically independent convenience kinetics
  // GENE_ASSOCIATION: PA3636
  // SUBSYSTEM: Lipopolysaccharide biosynthesis
  // EC Number: 2.5.1.55,4.1.2.16
  // Confidence Level:
  // AUTHORS:
  R_rxn02331: $M_cpd00001_c + $M_cpd00061_c + $M_cpd00817_c => $M_cpd00067_c + $M_cpd00009_c + $M_cpd02730_c; vmag_R_rxn02331*(M_cpd00001_c*c/kmc_R_rxn02331_M_cpd00001_c*(M_cpd00817_c*c/kmc_R_rxn02331_M_cpd00817_c)*(M_cpd00061_c*c/kmc_R_rxn02331_M_cpd00061_c)*sqrt((kG_M_cpd00001_c*kmc_R_rxn02331_M_cpd00001_c)^1*(kG_M_cpd00817_c*kmc_R_rxn02331_M_cpd00817_c)^1*(kG_M_cpd00061_c*kmc_R_rxn02331_M_cpd00061_c)^1/((kG_M_cpd00067_c*kmc_R_rxn02331_M_cpd00067_c)^1*(kG_M_cpd02730_c*kmc_R_rxn02331_M_cpd02730_c)^1*(kG_M_cpd00009_c*kmc_R_rxn02331_M_cpd00009_c)^1))/((1 + M_cpd00001_c*c/kmc_R_rxn02331_M_cpd00001_c)*(1 + M_cpd00817_c*c/kmc_R_rxn02331_M_cpd00817_c)*(1 + M_cpd00061_c*c/kmc_R_rxn02331_M_cpd00061_c))); R_rxn02331 is "2-dehydro-3-deoxy-phosphooctonate aldolase";  // hasProperty ec-code:2.5.1.55 ec-code:4.1.2.16
    kmc_R_rxn02331_M_cpd00001_c = 1 substance; kmc_R_rxn02331_M_cpd00061_c = 1 substance; kmc_R_rxn02331_M_cpd00817_c = 1 substance; kmc_R_rxn02331_M_cpd00067_c = 1 substance; kmc_R_rxn02331_M_cpd00009_c = 1 substance; kmc_R_rxn02331_M_cpd02730_c = 1 substance; vmag_R_rxn02331 = 1 mole_per_second;
  // GENE_ASSOCIATION: PA3643
  // SUBSYSTEM: Lipopolysaccharide biosynthesis
  // EC Number: 2.4.1.182
  // Confidence Level:
  // AUTHORS:
  R_rxn13874: $M_cpd17070_c + $M_cpd17069_c -> $M_cpd00067_c + $M_cpd00014_c + $M_cpd17067_c; (vmaf_R_rxn13874*(M_cpd17070_c*c/kmc_R_rxn13874_M_cpd17070_c)^hco_R_rxn13874*(M_cpd17069_c*c/kmc_R_rxn13874_M_cpd17069_c)^hco_R_rxn13874 - vmar_R_rxn13874*(M_cpd00067_c*c/kmc_R_rxn13874_M_cpd00067_c)^hco_R_rxn13874*(M_cpd00014_c*c/kmc_R_rxn13874_M_cpd00014_c)^hco_R_rxn13874*(M_cpd17067_c*c/kmc_R_rxn13874_M_cpd17067_c)^hco_R_rxn13874)/((1 + M_cpd17070_c*c/kmc_R_rxn13874_M_cpd17070_c)^hco_R_rxn13874*(1 + M_cpd17069_c*c/kmc_R_rxn13874_M_cpd17069_c)^hco_R_rxn13874 + (1 + M_cpd00067_c*c/kmc_R_rxn13874_M_cpd00067_c)^hco_R_rxn13874*(1 + M_cpd00014_c*c/kmc_R_rxn13874_M_cpd00014_c)^hco_R_rxn13874*(1 + M_cpd17067_c*c/kmc_R_rxn13874_M_cpd17067_c)^hco_R_rxn13874 - 1); R_rxn13874 is "pseudomonas Lipid A disaccaride synthase";  // hasProperty ec-code:2.4.1.182
    vmaf_R_rxn13874 = 1 mole_per_second; hco_R_rxn13874 = 1 dimensionless; kmc_R_rxn13874_M_cpd17070_c = 1 substance; kmc_R_rxn13874_M_cpd17069_c = 1 substance; vmar_R_rxn13874 = 1 mole_per_second; kmc_R_rxn13874_M_cpd00067_c = 1 substance; kmc_R_rxn13874_M_cpd00014_c = 1 substance; kmc_R_rxn13874_M_cpd17067_c = 1 substance;
  // Reversibel rapid-equilibrium random order ternary-complex mechanism, two products
  // GENE_ASSOCIATION: PA3644
  // SUBSYSTEM: Lipopolysaccharide biosynthesis
  // Confidence Level:
  // AUTHORS:
  R_rxn13882: $M_cpd11482_c + $M_cpd00037_c -> $M_cpd11493_c + $M_cpd17071_c; (vmaf_R_rxn13882/(kic_R_rxn13882_M_cpd11482_c*kmc_R_rxn13882_M_cpd00037_c)*M_cpd11482_c*c*M_cpd00037_c*c - vmar_R_rxn13882/(kic_R_rxn13882_M_cpd17071_c*kmc_R_rxn13882_M_cpd11493_c)*M_cpd11493_c*c*M_cpd17071_c*c)/(1 + M_cpd11482_c*c*M_cpd00037_c*c/(kic_R_rxn13882_M_cpd11482_c*kmc_R_rxn13882_M_cpd00037_c) + M_cpd11482_c*c/kic_R_rxn13882_M_cpd11482_c + M_cpd11493_c*c*M_cpd17071_c*c/(kic_R_rxn13882_M_cpd17071_c*kmc_R_rxn13882_M_cpd11493_c) + M_cpd00037_c*c/kic_R_rxn13882_M_cpd00037_c + M_cpd17071_c*c/kic_R_rxn13882_M_cpd17071_c + M_cpd11493_c*c/kic_R_rxn13882_M_cpd11493_c); R_rxn13882 is "acyl-[acyl-carrier-protein]-UDP-N-acetylglucosamine O-acyltransferase";
    vmaf_R_rxn13882 = 1 mole_per_second; vmar_R_rxn13882 = 1 mole_per_second; kmc_R_rxn13882_M_cpd00037_c = 1 substance; kmc_R_rxn13882_M_cpd11493_c = 1 substance; kic_R_rxn13882_M_cpd11493_c = 1 substance; kic_R_rxn13882_M_cpd17071_c = 1 substance; kic_R_rxn13882_M_cpd11482_c = 1 substance; kic_R_rxn13882_M_cpd00037_c = 1 substance;
  // GENE_ASSOCIATION: PA3646
  // SUBSYSTEM: Lipopolysaccharide biosynthesis
  // Confidence Level:
  // AUTHORS:
  R_rxn13881: $M_cpd11480_c + $M_cpd17072_c -> $M_cpd00067_c + $M_cpd11493_c + $M_cpd17070_c; (vmaf_R_rxn13881*(M_cpd11480_c*c/kmc_R_rxn13881_M_cpd11480_c)^hco_R_rxn13881*(M_cpd17072_c*c/kmc_R_rxn13881_M_cpd17072_c)^hco_R_rxn13881 - vmar_R_rxn13881*(M_cpd00067_c*c/kmc_R_rxn13881_M_cpd00067_c)^hco_R_rxn13881*(M_cpd11493_c*c/kmc_R_rxn13881_M_cpd11493_c)^hco_R_rxn13881*(M_cpd17070_c*c/kmc_R_rxn13881_M_cpd17070_c)^hco_R_rxn13881)/((1 + M_cpd11480_c*c/kmc_R_rxn13881_M_cpd11480_c)^hco_R_rxn13881*(1 + M_cpd17072_c*c/kmc_R_rxn13881_M_cpd17072_c)^hco_R_rxn13881 + (1 + M_cpd00067_c*c/kmc_R_rxn13881_M_cpd00067_c)^hco_R_rxn13881*(1 + M_cpd11493_c*c/kmc_R_rxn13881_M_cpd11493_c)^hco_R_rxn13881*(1 + M_cpd17070_c*c/kmc_R_rxn13881_M_cpd17070_c)^hco_R_rxn13881 - 1); R_rxn13881 is "Pseudomonas UDP-3-O-(acyl)glucosamine acyltransferase";
    vmaf_R_rxn13881 = 1 mole_per_second; hco_R_rxn13881 = 1 dimensionless; kmc_R_rxn13881_M_cpd11480_c = 1 substance; kmc_R_rxn13881_M_cpd17072_c = 1 substance; vmar_R_rxn13881 = 1 mole_per_second; kmc_R_rxn13881_M_cpd00067_c = 1 substance; kmc_R_rxn13881_M_cpd11493_c = 1 substance; kmc_R_rxn13881_M_cpd17070_c = 1 substance;
  // Reversibel rapid-equilibrium random order ternary-complex mechanism, two products
  // GENE_ASSOCIATION: PA4406
  // SUBSYSTEM: Lipopolysaccharide biosynthesis
  // Confidence Level:
  // AUTHORS:
  R_rxn13883: $M_cpd00001_c + $M_cpd17071_c -> $M_cpd00029_c + $M_cpd17072_c; (vmaf_R_rxn13883/(kic_R_rxn13883_M_cpd00001_c*kmc_R_rxn13883_M_cpd17071_c)*M_cpd00001_c*c*M_cpd17071_c*c - vmar_R_rxn13883/(kic_R_rxn13883_M_cpd17072_c*kmc_R_rxn13883_M_cpd00029_c)*M_cpd00029_c*c*M_cpd17072_c*c)/(1 + M_cpd00001_c*c*M_cpd17071_c*c/(kic_R_rxn13883_M_cpd00001_c*kmc_R_rxn13883_M_cpd17071_c) + M_cpd00001_c*c/kic_R_rxn13883_M_cpd00001_c + M_cpd00029_c*c*M_cpd17072_c*c/(kic_R_rxn13883_M_cpd17072_c*kmc_R_rxn13883_M_cpd00029_c) + M_cpd17071_c*c/kic_R_rxn13883_M_cpd17071_c + M_cpd17072_c*c/kic_R_rxn13883_M_cpd17072_c + M_cpd00029_c*c/kic_R_rxn13883_M_cpd00029_c); R_rxn13883 is "UDP-3-0-acyl N-acetylglucosamine deacetylase";
    vmaf_R_rxn13883 = 1 mole_per_second; vmar_R_rxn13883 = 1 mole_per_second; kmc_R_rxn13883_M_cpd17071_c = 1 substance; kmc_R_rxn13883_M_cpd00029_c = 1 substance; kic_R_rxn13883_M_cpd00029_c = 1 substance; kic_R_rxn13883_M_cpd17072_c = 1 substance; kic_R_rxn13883_M_cpd00001_c = 1 substance; kic_R_rxn13883_M_cpd17071_c = 1 substance;
  // GENE_ASSOCIATION: PA4425
  // SUBSYSTEM: Lipopolysaccharide biosynthesis
  // EC Number: 5.-.-.-
  // Confidence Level:
  // AUTHORS:
  R_rxn03917: $M_cpd00238_c -> $M_cpd04918_c; (vmaf_R_rxn03917/kmc_R_rxn03917_M_cpd00238_c*M_cpd00238_c*c - vmar_R_rxn03917/kmc_R_rxn03917_M_cpd04918_c*M_cpd04918_c*c)/(1 substance + M_cpd00238_c*c/kmc_R_rxn03917_M_cpd00238_c + M_cpd04918_c*c/kmc_R_rxn03917_M_cpd04918_c); R_rxn03917 is "sedoheptulose 7-phosphate isomerase";  // hasProperty ec-code:5.-.-.-
    vmaf_R_rxn03917 = 1 mole_per_second; kmc_R_rxn03917_M_cpd00238_c = 1 substance; vmar_R_rxn03917 = 1 mole_per_second; kmc_R_rxn03917_M_cpd04918_c = 1 substance;
  // GENE_ASSOCIATION: PA4457
  // SUBSYSTEM: Lipopolysaccharide biosynthesis
  // EC Number: 5.3.1.13
  // Confidence Level:
  // AUTHORS:
  R_rxn01117: $M_cpd00817_c -> $M_cpd00171_c; (vmaf_R_rxn01117/kmc_R_rxn01117_M_cpd00817_c*M_cpd00817_c*c - vmar_R_rxn01117/kmc_R_rxn01117_M_cpd00171_c*M_cpd00171_c*c)/(1 substance + M_cpd00817_c*c/kmc_R_rxn01117_M_cpd00817_c + M_cpd00171_c*c/kmc_R_rxn01117_M_cpd00171_c); R_rxn01117 is "arabinose-5-phosphate isomerase";  // hasProperty ec-code:5.3.1.13
    vmaf_R_rxn01117 = 1 mole_per_second; kmc_R_rxn01117_M_cpd00817_c = 1 substance; vmar_R_rxn01117 = 1 mole_per_second; kmc_R_rxn01117_M_cpd00171_c = 1 substance;
  // Thermodynamically independent convenience kinetics
  // GENE_ASSOCIATION: PA4458
  // SUBSYSTEM: Lipopolysaccharide biosynthesis
  // EC Number: 3.1.3.45
  // Confidence Level:
  // AUTHORS:
  R_rxn02404: $M_cpd00001_c + $M_cpd02730_c => $M_cpd00067_c + $M_cpd00009_c + $M_cpd00875_c; vmag_R_rxn02404*(M_cpd00001_c*c/kmc_R_rxn02404_M_cpd00001_c*(M_cpd02730_c*c/kmc_R_rxn02404_M_cpd02730_c)*sqrt((kG_M_cpd00001_c*kmc_R_rxn02404_M_cpd00001_c)^1*(kG_M_cpd02730_c*kmc_R_rxn02404_M_cpd02730_c)^1/((kG_M_cpd00067_c*kmc_R_rxn02404_M_cpd00067_c)^1*(kG_M_cpd00875_c*kmc_R_rxn02404_M_cpd00875_c)^1*(kG_M_cpd00009_c*kmc_R_rxn02404_M_cpd00009_c)^1))/((1 + M_cpd00001_c*c/kmc_R_rxn02404_M_cpd00001_c)*(1 + M_cpd02730_c*c/kmc_R_rxn02404_M_cpd02730_c))); R_rxn02404 is "3-deoxy-manno-octulosonate-8-phosphatase";  // hasProperty ec-code:3.1.3.45
    kmc_R_rxn02404_M_cpd00001_c = 1 substance; kmc_R_rxn02404_M_cpd02730_c = 1 substance; kmc_R_rxn02404_M_cpd00067_c = 1 substance; kmc_R_rxn02404_M_cpd00009_c = 1 substance; kmc_R_rxn02404_M_cpd00875_c = 1 substance; vmag_R_rxn02404 = 1 mole_per_second;
  // GENE_ASSOCIATION: PA4988
  // SUBSYSTEM: Lipopolysaccharide biosynthesis
  // Confidence Level:
  // AUTHORS:
  R_rxn13878: $M_cpd17066_c + $M_cpd02546_c -> $M_cpd00067_c + $M_cpd00046_c + $M_cpd17055_c; (vmaf_R_rxn13878*(M_cpd17066_c*c/kmc_R_rxn13878_M_cpd17066_c)^hco_R_rxn13878*(M_cpd02546_c*c/kmc_R_rxn13878_M_cpd02546_c)^hco_R_rxn13878 - vmar_R_rxn13878*(M_cpd00067_c*c/kmc_R_rxn13878_M_cpd00067_c)^hco_R_rxn13878*(M_cpd00046_c*c/kmc_R_rxn13878_M_cpd00046_c)^hco_R_rxn13878*(M_cpd17055_c*c/kmc_R_rxn13878_M_cpd17055_c)^hco_R_rxn13878)/((1 + M_cpd17066_c*c/kmc_R_rxn13878_M_cpd17066_c)^hco_R_rxn13878*(1 + M_cpd02546_c*c/kmc_R_rxn13878_M_cpd02546_c)^hco_R_rxn13878 + (1 + M_cpd00067_c*c/kmc_R_rxn13878_M_cpd00067_c)^hco_R_rxn13878*(1 + M_cpd00046_c*c/kmc_R_rxn13878_M_cpd00046_c)^hco_R_rxn13878*(1 + M_cpd17055_c*c/kmc_R_rxn13878_M_cpd17055_c)^hco_R_rxn13878 - 1); R_rxn13878 is "3-deoxy-D-manno-octulosonic acid transferase";
    vmaf_R_rxn13878 = 1 mole_per_second; hco_R_rxn13878 = 1 dimensionless; kmc_R_rxn13878_M_cpd17066_c = 1 substance; kmc_R_rxn13878_M_cpd02546_c = 1 substance; vmar_R_rxn13878 = 1 mole_per_second; kmc_R_rxn13878_M_cpd00067_c = 1 substance; kmc_R_rxn13878_M_cpd00046_c = 1 substance; kmc_R_rxn13878_M_cpd17055_c = 1 substance;
  // GENE_ASSOCIATION: PA4988
  // SUBSYSTEM: Lipopolysaccharide biosynthesis
  // Confidence Level:
  // AUTHORS:
  R_rxn13879: $M_cpd02546_c + $M_cpd17055_c -> $M_cpd00067_c + $M_cpd00046_c + $M_cpd17054_c; (vmaf_R_rxn13879*(M_cpd02546_c*c/kmc_R_rxn13879_M_cpd02546_c)^hco_R_rxn13879*(M_cpd17055_c*c/kmc_R_rxn13879_M_cpd17055_c)^hco_R_rxn13879 - vmar_R_rxn13879*(M_cpd00067_c*c/kmc_R_rxn13879_M_cpd00067_c)^hco_R_rxn13879*(M_cpd00046_c*c/kmc_R_rxn13879_M_cpd00046_c)^hco_R_rxn13879*(M_cpd17054_c*c/kmc_R_rxn13879_M_cpd17054_c)^hco_R_rxn13879)/((1 + M_cpd02546_c*c/kmc_R_rxn13879_M_cpd02546_c)^hco_R_rxn13879*(1 + M_cpd17055_c*c/kmc_R_rxn13879_M_cpd17055_c)^hco_R_rxn13879 + (1 + M_cpd00067_c*c/kmc_R_rxn13879_M_cpd00067_c)^hco_R_rxn13879*(1 + M_cpd00046_c*c/kmc_R_rxn13879_M_cpd00046_c)^hco_R_rxn13879*(1 + M_cpd17054_c*c/kmc_R_rxn13879_M_cpd17054_c)^hco_R_rxn13879 - 1); R_rxn13879 is "3-deoxy-D-manno-octulosonic acid transferase";
    vmaf_R_rxn13879 = 1 mole_per_second; hco_R_rxn13879 = 1 dimensionless; kmc_R_rxn13879_M_cpd02546_c = 1 substance; kmc_R_rxn13879_M_cpd17055_c = 1 substance; vmar_R_rxn13879 = 1 mole_per_second; kmc_R_rxn13879_M_cpd00067_c = 1 substance; kmc_R_rxn13879_M_cpd00046_c = 1 substance; kmc_R_rxn13879_M_cpd17054_c = 1 substance;
  // Reversibel rapid-equilibrium random order ternary-complex mechanism, two products
  // GENE_ASSOCIATION: PA4996
  // SUBSYSTEM: Lipopolysaccharide biosynthesis
  // EC Number: 2.7.-.-,2.7.7.-
  // Confidence Level:
  // AUTHORS:
  R_rxn03916: $M_cpd00002_c + $M_cpd04920_c -> $M_cpd00012_c + $M_cpd03830_c; (vmaf_R_rxn03916/(kic_R_rxn03916_M_cpd00002_c*kmc_R_rxn03916_M_cpd04920_c)*M_cpd00002_c*c*M_cpd04920_c*c - vmar_R_rxn03916/(kic_R_rxn03916_M_cpd03830_c*kmc_R_rxn03916_M_cpd00012_c)*M_cpd00012_c*c*M_cpd03830_c*c)/(1 + M_cpd00002_c*c*M_cpd04920_c*c/(kic_R_rxn03916_M_cpd00002_c*kmc_R_rxn03916_M_cpd04920_c) + M_cpd00002_c*c/kic_R_rxn03916_M_cpd00002_c + M_cpd00012_c*c*M_cpd03830_c*c/(kic_R_rxn03916_M_cpd03830_c*kmc_R_rxn03916_M_cpd00012_c) + M_cpd04920_c*c/kic_R_rxn03916_M_cpd04920_c + M_cpd03830_c*c/kic_R_rxn03916_M_cpd03830_c + M_cpd00012_c*c/kic_R_rxn03916_M_cpd00012_c); R_rxn03916 is "D-glycero-D-manno-hepose 1-phosphate adenyltransferase";  // hasProperty ec-code:2.7.-.- ec-code:2.7.7.-
    vmaf_R_rxn03916 = 1 mole_per_second; vmar_R_rxn03916 = 1 mole_per_second; kmc_R_rxn03916_M_cpd04920_c = 1 substance; kmc_R_rxn03916_M_cpd00012_c = 1 substance; kic_R_rxn03916_M_cpd00012_c = 1 substance; kic_R_rxn03916_M_cpd03830_c = 1 substance; kic_R_rxn03916_M_cpd00002_c = 1 substance; kic_R_rxn03916_M_cpd04920_c = 1 substance;
  // Reversibel rapid-equilibrium random order ternary-complex mechanism, two products
  // GENE_ASSOCIATION: PA4996
  // SUBSYSTEM: Lipopolysaccharide biosynthesis
  // EC Number: 2.7.-.-,2.7.1.-
  // Confidence Level:
  // AUTHORS:
  R_rxn03918: $M_cpd00002_c + $M_cpd04918_c -> $M_cpd00008_c + $M_cpd08316_c; (vmaf_R_rxn03918/(kic_R_rxn03918_M_cpd00002_c*kmc_R_rxn03918_M_cpd04918_c)*M_cpd00002_c*c*M_cpd04918_c*c - vmar_R_rxn03918/(kic_R_rxn03918_M_cpd08316_c*kmc_R_rxn03918_M_cpd00008_c)*M_cpd00008_c*c*M_cpd08316_c*c)/(1 + M_cpd00002_c*c*M_cpd04918_c*c/(kic_R_rxn03918_M_cpd00002_c*kmc_R_rxn03918_M_cpd04918_c) + M_cpd00002_c*c/kic_R_rxn03918_M_cpd00002_c + M_cpd00008_c*c*M_cpd08316_c*c/(kic_R_rxn03918_M_cpd08316_c*kmc_R_rxn03918_M_cpd00008_c) + M_cpd04918_c*c/kic_R_rxn03918_M_cpd04918_c + M_cpd08316_c*c/kic_R_rxn03918_M_cpd08316_c + M_cpd00008_c*c/kic_R_rxn03918_M_cpd00008_c); R_rxn03918 is "D-glycero-D-manno-heptose 7-phosphate kinase";  // hasProperty ec-code:2.7.-.- ec-code:2.7.1.-
    vmaf_R_rxn03918 = 1 mole_per_second; vmar_R_rxn03918 = 1 mole_per_second; kmc_R_rxn03918_M_cpd04918_c = 1 substance; kmc_R_rxn03918_M_cpd00008_c = 1 substance; kic_R_rxn03918_M_cpd00008_c = 1 substance; kic_R_rxn03918_M_cpd08316_c = 1 substance; kic_R_rxn03918_M_cpd00002_c = 1 substance; kic_R_rxn03918_M_cpd04918_c = 1 substance;
  // Thermodynamically independent convenience kinetics
  // GENE_ASSOCIATION: PA5010
  // SUBSYSTEM: Lipopolysaccharide biosynthesis
  // Confidence Level:
  // AUTHORS:
  R_rxn13867: 3 $M_cpd00026_c + $M_cpd17060_c => 3 $M_cpd00014_c + $M_cpd17061_c; vmag_R_rxn13867*((M_cpd00026_c*c/kmc_R_rxn13867_M_cpd00026_c)^3*(M_cpd17060_c*c/kmc_R_rxn13867_M_cpd17060_c)*sqrt((kG_M_cpd00026_c*kmc_R_rxn13867_M_cpd00026_c)^3*(kG_M_cpd17060_c*kmc_R_rxn13867_M_cpd17060_c)^1/((kG_M_cpd00014_c*kmc_R_rxn13867_M_cpd00014_c)^3*(kG_M_cpd17061_c*kmc_R_rxn13867_M_cpd17061_c)^1))/((1 + M_cpd00026_c*c/kmc_R_rxn13867_M_cpd00026_c + (M_cpd00026_c*c/kmc_R_rxn13867_M_cpd00026_c)^2 + (M_cpd00026_c*c/kmc_R_rxn13867_M_cpd00026_c)^3)*(1 + M_cpd17060_c*c/kmc_R_rxn13867_M_cpd17060_c))); R_rxn13867 is "alpha 1,3-glucosyltransferase";
    kmc_R_rxn13867_M_cpd00026_c = 1 substance; kmc_R_rxn13867_M_cpd17060_c = 1 substance; kmc_R_rxn13867_M_cpd00014_c = 1 substance; kmc_R_rxn13867_M_cpd17061_c = 1 substance; vmag_R_rxn13867 = 1 mole_per_second;
  // Irreversibel rapid-equilibrium random order ternary-complex mechanism, two products
  // GENE_ASSOCIATION: PA5010
  // SUBSYSTEM: Lipopolysaccharide biosynthesis
  // Confidence Level:
  // AUTHORS:
  R_rxn13866: $M_cpd00043_c + $M_cpd17059_c => $M_cpd00014_c + $M_cpd17060_c; vmax_R_rxn13866*M_cpd17059_c*c*M_cpd00043_c*c/(kic_R_rxn13866_M_cpd00043_c*kmc_R_rxn13866_M_cpd17059_c + M_cpd00043_c*c*M_cpd17059_c*c + kmc_R_rxn13866_M_cpd17059_c*M_cpd00043_c*c + kmc_R_rxn13866_M_cpd00043_c*M_cpd17059_c*c); R_rxn13866 is "alpha 1,3-glucosyltransferase";
    vmax_R_rxn13866 = 1 mole_per_second; kmc_R_rxn13866_M_cpd00043_c = 1 substance; kmc_R_rxn13866_M_cpd17059_c = 1 substance; kic_R_rxn13866_M_cpd00043_c = 1 substance;
  // Irreversibel rapid-equilibrium random order ternary-complex mechanism, two products
  // GENE_ASSOCIATION: PA5010
  // SUBSYSTEM: Lipopolysaccharide biosynthesis
  // Confidence Level:
  // AUTHORS:
  R_rxn13869: $M_cpd00026_c + $M_cpd17062_c => $M_cpd00014_c + $M_cpd17063_c; vmax_R_rxn13869*M_cpd17062_c*c*M_cpd00026_c*c/(kic_R_rxn13869_M_cpd00026_c*kmc_R_rxn13869_M_cpd17062_c + M_cpd00026_c*c*M_cpd17062_c*c + kmc_R_rxn13869_M_cpd17062_c*M_cpd00026_c*c + kmc_R_rxn13869_M_cpd00026_c*M_cpd17062_c*c); R_rxn13869 is "b-D-glucosyltransferase";
    vmax_R_rxn13869 = 1 mole_per_second; kmc_R_rxn13869_M_cpd00026_c = 1 substance; kmc_R_rxn13869_M_cpd17062_c = 1 substance; kic_R_rxn13869_M_cpd00026_c = 1 substance;
  // Irreversibel rapid-equilibrium random order ternary-complex mechanism, two products
  // GENE_ASSOCIATION: PA5011
  // SUBSYSTEM: Lipopolysaccharide biosynthesis
  // Confidence Level:
  // AUTHORS:
  R_rPY00222: $M_cpd03831_c + $M_cpd17054_c => $M_cpd00008_c + $M_cpd17058_c; vmax_R_rPY00222*M_cpd17054_c*c*M_cpd03831_c*c/(kic_R_rPY00222_M_cpd03831_c*kmc_R_rPY00222_M_cpd17054_c + M_cpd03831_c*c*M_cpd17054_c*c + kmc_R_rPY00222_M_cpd17054_c*M_cpd03831_c*c + kmc_R_rPY00222_M_cpd03831_c*M_cpd17054_c*c); R_rPY00222 is "heptosyltransferase I";
    vmax_R_rPY00222 = 1 mole_per_second; kmc_R_rPY00222_M_cpd03831_c = 1 substance; kmc_R_rPY00222_M_cpd17054_c = 1 substance; kic_R_rPY00222_M_cpd03831_c = 1 substance;
  // Irreversibel rapid-equilibrium random order ternary-complex mechanism, two products
  // GENE_ASSOCIATION: PA5012
  // SUBSYSTEM: Lipopolysaccharide biosynthesis
  // Confidence Level:
  // AUTHORS:
  R_rPY00221: $M_cpd03831_c + $M_cpd17058_c => $M_cpd00008_c + $M_cpd17059_c; vmax_R_rPY00221*M_cpd17058_c*c*M_cpd03831_c*c/(kic_R_rPY00221_M_cpd03831_c*kmc_R_rPY00221_M_cpd17058_c + M_cpd03831_c*c*M_cpd17058_c*c + kmc_R_rPY00221_M_cpd17058_c*M_cpd03831_c*c + kmc_R_rPY00221_M_cpd03831_c*M_cpd17058_c*c); R_rPY00221 is "heptosyltransferase II";
    vmax_R_rPY00221 = 1 mole_per_second; kmc_R_rPY00221_M_cpd03831_c = 1 substance; kmc_R_rPY00221_M_cpd17058_c = 1 substance; kic_R_rPY00221_M_cpd03831_c = 1 substance;
  // Irreversibel rapid-equilibrium random order ternary-complex mechanism, two products
  // GENE_ASSOCIATION: PA5447
  // SUBSYSTEM: Lipopolysaccharide biosynthesis
  // Confidence Level:
  // AUTHORS:
  R_rxn13899: $M_cpd01999_c + $M_cpd00946_c => $M_cpd00091_c + $M_cpd17086_c; vmax_R_rxn13899*M_cpd00946_c*c*M_cpd01999_c*c/(kic_R_rxn13899_M_cpd01999_c*kmc_R_rxn13899_M_cpd00946_c + M_cpd01999_c*c*M_cpd00946_c*c + kmc_R_rxn13899_M_cpd00946_c*M_cpd01999_c*c + kmc_R_rxn13899_M_cpd01999_c*M_cpd00946_c*c); R_rxn13899 is "Rha-(a1,3)-GlcNac-pyrophosphorylundecaprenol synthesis";
    vmax_R_rxn13899 = 1 mole_per_second; kmc_R_rxn13899_M_cpd01999_c = 1 substance; kmc_R_rxn13899_M_cpd00946_c = 1 substance; kic_R_rxn13899_M_cpd01999_c = 1 substance;
  // Thermodynamically independent convenience kinetics
  // GENE_ASSOCIATION: PA5448
  // SUBSYSTEM: Lipopolysaccharide biosynthesis
  // Confidence Level:
  // AUTHORS:
  R_rxn13900: 2 $M_cpd01999_c + $M_cpd17086_c => 2 $M_cpd00126_c + $M_cpd17087_c; vmag_R_rxn13900*((M_cpd01999_c*c/kmc_R_rxn13900_M_cpd01999_c)^2*(M_cpd17086_c*c/kmc_R_rxn13900_M_cpd17086_c)*sqrt((kG_M_cpd01999_c*kmc_R_rxn13900_M_cpd01999_c)^2*(kG_M_cpd17086_c*kmc_R_rxn13900_M_cpd17086_c)^1/((kG_M_cpd00126_c*kmc_R_rxn13900_M_cpd00126_c)^2*(kG_M_cpd17087_c*kmc_R_rxn13900_M_cpd17087_c)^1))/((1 + M_cpd01999_c*c/kmc_R_rxn13900_M_cpd01999_c + (M_cpd01999_c*c/kmc_R_rxn13900_M_cpd01999_c)^2)*(1 + M_cpd17086_c*c/kmc_R_rxn13900_M_cpd17086_c))); R_rxn13900 is "Rha-(a1,3)-Rha-(a1,3)-Rha-(a1,3)-GlcNac-pyrophosphorylundecaprenol synthesis";
    kmc_R_rxn13900_M_cpd01999_c = 1 substance; kmc_R_rxn13900_M_cpd17086_c = 1 substance; kmc_R_rxn13900_M_cpd00126_c = 1 substance; kmc_R_rxn13900_M_cpd17087_c = 1 substance; vmag_R_rxn13900 = 1 mole_per_second;
  // Irreversibel rapid-equilibrium random order ternary-complex mechanism, two products
  // GENE_ASSOCIATION: PA5449
  // SUBSYSTEM: Lipopolysaccharide biosynthesis
  // Confidence Level:
  // AUTHORS:
  R_rxn13901: $M_cpd01999_c + $M_cpd17087_c => $M_cpd00126_c + $M_cpd17088_c; vmax_R_rxn13901*M_cpd17087_c*c*M_cpd01999_c*c/(kic_R_rxn13901_M_cpd01999_c*kmc_R_rxn13901_M_cpd17087_c + M_cpd01999_c*c*M_cpd17087_c*c + kmc_R_rxn13901_M_cpd17087_c*M_cpd01999_c*c + kmc_R_rxn13901_M_cpd01999_c*M_cpd17087_c*c); R_rxn13901 is "A-band O-antigen synthesis";
    vmax_R_rxn13901 = 1 mole_per_second; kmc_R_rxn13901_M_cpd01999_c = 1 substance; kmc_R_rxn13901_M_cpd17087_c = 1 substance; kic_R_rxn13901_M_cpd01999_c = 1 substance;
  // Thermodynamically independent convenience kinetics
  // SUBSYSTEM: Lipopolysaccharide biosynthesis
  // Confidence Level:
  // AUTHORS:
  R_rxn13868: 2 $M_cpd02113_c + $M_cpd17061_c => 2 $M_cpd00297_c + $M_cpd17062_c; vmag_R_rxn13868*((M_cpd02113_c*c/kmc_R_rxn13868_M_cpd02113_c)^2*(M_cpd17061_c*c/kmc_R_rxn13868_M_cpd17061_c)*sqrt((kG_M_cpd02113_c*kmc_R_rxn13868_M_cpd02113_c)^2*(kG_M_cpd17061_c*kmc_R_rxn13868_M_cpd17061_c)^1/((kG_M_cpd00297_c*kmc_R_rxn13868_M_cpd00297_c)^2*(kG_M_cpd17062_c*kmc_R_rxn13868_M_cpd17062_c)^1))/((1 + M_cpd02113_c*c/kmc_R_rxn13868_M_cpd02113_c + (M_cpd02113_c*c/kmc_R_rxn13868_M_cpd02113_c)^2)*(1 + M_cpd17061_c*c/kmc_R_rxn13868_M_cpd17061_c))); R_rxn13868 is "L-rhamnotransferase";
    kmc_R_rxn13868_M_cpd02113_c = 1 substance; kmc_R_rxn13868_M_cpd17061_c = 1 substance; kmc_R_rxn13868_M_cpd00297_c = 1 substance; kmc_R_rxn13868_M_cpd17062_c = 1 substance; vmag_R_rxn13868 = 1 mole_per_second;
  // Irreversibel rapid-equilibrium random order ternary-complex mechanism, two products
  // SUBSYSTEM: Lipopolysaccharide biosynthesis
  // Confidence Level:
  // AUTHORS:
  R_rxn13876: $M_cpd17065_c + $M_cpd17088_c => $M_cpd02229_c + $M_cpd17056_c; vmax_R_rxn13876*M_cpd17088_c*c*M_cpd17065_c*c/(kic_R_rxn13876_M_cpd17065_c*kmc_R_rxn13876_M_cpd17088_c + M_cpd17065_c*c*M_cpd17088_c*c + kmc_R_rxn13876_M_cpd17088_c*M_cpd17065_c*c + kmc_R_rxn13876_M_cpd17065_c*M_cpd17088_c*c); R_rxn13876 is "Pseudomonas aeruginosa LPS A-band synthesis";
    vmax_R_rxn13876 = 1 mole_per_second; kmc_R_rxn13876_M_cpd17065_c = 1 substance; kmc_R_rxn13876_M_cpd17088_c = 1 substance; kic_R_rxn13876_M_cpd17065_c = 1 substance;
  // Thermodynamically independent convenience kinetics
  // SUBSYSTEM: Lipopolysaccharide biosynthesis
  // Confidence Level:
  // AUTHORS:
  R_rxn13871: $M_cpd00035_c + $M_cpd00146_c + $M_cpd17064_c => $M_cpd00001_c + $M_cpd00009_c + $M_cpd17065_c; vmag_R_rxn13871*(M_cpd00035_c*c/kmc_R_rxn13871_M_cpd00035_c*(M_cpd17064_c*c/kmc_R_rxn13871_M_cpd17064_c)*(M_cpd00146_c*c/kmc_R_rxn13871_M_cpd00146_c)*sqrt((kG_M_cpd00035_c*kmc_R_rxn13871_M_cpd00035_c)^1*(kG_M_cpd17064_c*kmc_R_rxn13871_M_cpd17064_c)^1*(kG_M_cpd00146_c*kmc_R_rxn13871_M_cpd00146_c)^1/((kG_M_cpd00001_c*kmc_R_rxn13871_M_cpd00001_c)^1*(kG_M_cpd17065_c*kmc_R_rxn13871_M_cpd17065_c)^1*(kG_M_cpd00009_c*kmc_R_rxn13871_M_cpd00009_c)^1))/((1 + M_cpd00035_c*c/kmc_R_rxn13871_M_cpd00035_c)*(1 + M_cpd17064_c*c/kmc_R_rxn13871_M_cpd17064_c)*(1 + M_cpd00146_c*c/kmc_R_rxn13871_M_cpd00146_c))); R_rxn13871 is "Pseudomonas aeruginosa LPS lumped L-ala and CONH2 addition reaction";
    kmc_R_rxn13871_M_cpd00035_c = 1 substance; kmc_R_rxn13871_M_cpd00146_c = 1 substance; kmc_R_rxn13871_M_cpd17064_c = 1 substance; kmc_R_rxn13871_M_cpd00001_c = 1 substance; kmc_R_rxn13871_M_cpd00009_c = 1 substance; kmc_R_rxn13871_M_cpd17065_c = 1 substance; vmag_R_rxn13871 = 1 mole_per_second;
  // SUBSYSTEM: Lipopolysaccharide biosynthesis
  // Confidence Level:
  // AUTHORS:
  R_rxn13926: $M_cpd17094_c => $M_cpd17093_c; vmax_R_rxn13926*M_cpd17094_c*c/(kmc_R_rxn13926_M_cpd17094_c + M_cpd17094_c*c); R_rxn13926 is "UDP-N-acetyl-mannosamine (2NAc3N) acid (CH3C=NH) addase";
    vmax_R_rxn13926 = 1 mole_per_second; kmc_R_rxn13926_M_cpd17094_c = 1 substance;

  // Unit definitions:
  unit mmol_per_gDW_per_hr = 1e-3 mole / (gram * 2.777778e-4 second);
  unit volume = litre;
  unit substance = mole;
  unit area = metre^2;
  unit mole_per_second = mole / second;
end
