// SBML level 3 version 1

model main()
  // model units - substance: substance, time: second, volume: volume, area: area, length: metre, extent: substance

  // Compartments:
  compartment c = 1 volume; c is "Cytoplasm";
  compartment e; e has volume; e is "Extracellular";

  // Species:
  // FORMULA: H
  // CHARGE: 1
  species $M_cpd00067_c in c = 1; M_cpd00067_c is "H+";
  // FORMULA: H2O
  // CHARGE: 0
  species $M_cpd00001_c in c = 1; M_cpd00001_c is "H2O";
  // FORMULA: C21H26N7O17P3
  // CHARGE: -2
  species $M_cpd00006_c in c = 1; M_cpd00006_c is "NADP";
  // FORMULA: C21H27N7O17P3
  // CHARGE: -3
  species $M_cpd00005_c in c = 1; M_cpd00005_c is "NADPH";
  // FORMULA: CO2
  // CHARGE: 0
  species $M_cpd00011_c in c = 1; M_cpd00011_c is "CO2";
  // FORMULA: C4H6NO4
  // CHARGE: -1
  species $M_cpd00041_c in c = 1; M_cpd00041_c is "L-Aspartate";
  // FORMULA: HO4P
  // CHARGE: -2
  species $M_cpd00009_c in c = 1; M_cpd00009_c is "Phosphate";
  // FORMULA: C49H74O4
  // CHARGE: 0
  species $M_cpd15560_c in c = 1; M_cpd15560_c is "Ubiquinone-8";
  // FORMULA: C49H76O4
  // CHARGE: 0
  species $M_cpd15561_c in c = 1; M_cpd15561_c is "Ubiquinol-8";
  // FORMULA: C54H82O4
  // CHARGE: 0
  species $M_cpd01351_c in c = 1; M_cpd01351_c is "Ubiquinone-9";
  // FORMULA: C54H84O4
  // CHARGE: 0
  species $M_cJB00125_c in c = 1; M_cJB00125_c is "Ubiquinol-9";
  // FORMULA: O2
  // CHARGE: 0
  species $M_cpd00007_c in c = 1; M_cpd00007_c is "O2";
  // FORMULA: H2O2
  // CHARGE: 0
  species $M_cpd00025_c in c = 1; M_cpd00025_c is "H2O2";
  // FORMULA: C10H13N5O13P3
  // CHARGE: -3
  species $M_cpd00002_c in c = 1; M_cpd00002_c is "ATP";
  // FORMULA: C10H13N5O10P2
  // CHARGE: -2
  species $M_cpd00008_c in c = 1; M_cpd00008_c is "ADP";
  // FORMULA: C6H7NO2R2S2
  // CHARGE: 0
  species $M_cpd11420_c in c = 1; M_cpd11420_c is "trdox";
  // FORMULA: C6H9NO2R2S2
  // CHARGE: 0
  species $M_cpd11421_c in c = 1; M_cpd11421_c is "trdrd";
  // FORMULA: C5H8NO4
  // CHARGE: -1
  species $M_cpd00023_c in c = 1; M_cpd00023_c is "L-Glutamate";
  // FORMULA: C5H10N2O3
  // CHARGE: 0
  species $M_cpd00053_c in c = 1; M_cpd00053_c is "L-Glutamine";
  // FORMULA: C19H19N7O6
  // CHARGE: -2
  species $M_cpd00330_c in c = 1; M_cpd00330_c is "Dihydrofolate";
  // FORMULA: C20H21N7O6
  // CHARGE: -2
  species $M_cpd00125_c in c = 1; M_cpd00125_c is "5-10-Methylenetetrahydrofolate";
  // FORMULA: H4N
  // CHARGE: 1
  species $M_cpd00013_c in c = 1; M_cpd00013_c is "NH3";
  // FORMULA: H2O7P2
  // CHARGE: -2
  species $M_cpd00012_c in c = 1; M_cpd00012_c is "PPi";
  // FORMULA: C9H13N3O14P3
  // CHARGE: -3
  species $M_cpd00052_c in c = 1; M_cpd00052_c is "CTP";
  // FORMULA: C5H3N2O4
  // CHARGE: -1
  species $M_cpd00247_c in c = 1; M_cpd00247_c is "Orotate";
  // FORMULA: C4H5N3O
  // CHARGE: 0
  species $M_cpd00307_c in c = 1; M_cpd00307_c is "Cytosine";
  // FORMULA: C9H13N3O5
  // CHARGE: 0
  species $M_cpd00367_c in c = 1; M_cpd00367_c is "Cytidine";
  // FORMULA: C9H13N3O4
  // CHARGE: 0
  species $M_cpd00654_c in c = 1; M_cpd00654_c is "Deoxycytidine";
  // FORMULA: C10H14N2O5
  // CHARGE: 0
  species $M_cpd00184_c in c = 1; M_cpd00184_c is "Thymidine";
  // FORMULA: C9H12N2O6
  // CHARGE: 0
  species $M_cpd00249_c in c = 1; M_cpd00249_c is "Uridine";
  // FORMULA: C9H13N3O11P2
  // CHARGE: -2
  species $M_cpd00096_c in c = 1; M_cpd00096_c is "CDP";
  // FORMULA: C9H13N3O10P2
  // CHARGE: -2
  species $M_cpd00533_c in c = 1; M_cpd00533_c is "dCDP";
  // FORMULA: C9H12N2O12P2
  // CHARGE: -2
  species $M_cpd00014_c in c = 1; M_cpd00014_c is "UDP";
  // FORMULA: C9H12N2O11P2
  // CHARGE: -2
  species $M_cpd00978_c in c = 1; M_cpd00978_c is "dUDP";
  // FORMULA: C4H4N2O2
  // CHARGE: 0
  species $M_cpd00092_c in c = 1; M_cpd00092_c is "Uracil";
  // FORMULA: C51H74O2
  // CHARGE: 0
  species $M_cpd15499_c in c = 1; M_cpd15499_c is "Menaquinol_8";
  // FORMULA: C51H72O2
  // CHARGE: 0
  species $M_cpd15500_c in c = 1; M_cpd15500_c is "Menaquinone_8";
  // FORMULA: C9H13N3O8P
  // CHARGE: -1
  species $M_cpd00046_c in c = 1; M_cpd00046_c is "CMP";
  // FORMULA: CH3NO5P
  // CHARGE: -1
  species $M_cpd00146_c in c = 1; M_cpd00146_c is "Carbamoylphosphate";
  // FORMULA: C5H10O14P3
  // CHARGE: -3
  species $M_cpd00103_c in c = 1; M_cpd00103_c is "PRPP";
  // FORMULA: C9H12N2O9P
  // CHARGE: -1
  species $M_cpd00091_c in c = 1; M_cpd00091_c is "UMP";
  // FORMULA: C5H10O8P
  // CHARGE: -1
  species $M_cpd00101_c in c = 1; M_cpd00101_c is "ribose-5-phosphate";
  // FORMULA: C9H12N2O9P
  // CHARGE: -1
  species $M_cpd00859_c in c = 1; M_cpd00859_c is "Pseudouridine 5'-phosphate";
  // FORMULA: C9H12N2O8P
  // CHARGE: -1
  species $M_cpd00299_c in c = 1; M_cpd00299_c is "dUMP";
  // FORMULA: C10H14N2O8P
  // CHARGE: -1
  species $M_cpd00298_c in c = 1; M_cpd00298_c is "dTMP";
  // FORMULA: C5H6N2O5
  // CHARGE: -2
  species $M_cpd00343_c in c = 1; M_cpd00343_c is "N-Carbamoyl-L-aspartate";
  // FORMULA: C10H14N2O11P2
  // CHARGE: -2
  species $M_cpd00297_c in c = 1; M_cpd00297_c is "dTDP";
  // FORMULA: C9H13N3O13P3
  // CHARGE: -3
  species $M_cpd00356_c in c = 1; M_cpd00356_c is "dCTP";
  // FORMULA: C9H12N2O15P3
  // CHARGE: -3
  species $M_cpd00062_c in c = 1; M_cpd00062_c is "UTP";
  // FORMULA: C9H12N2O14P3
  // CHARGE: -3
  species $M_cpd00358_c in c = 1; M_cpd00358_c is "dUTP";
  // FORMULA: C10H11N2O11P
  // CHARGE: -2
  species $M_cpd00810_c in c = 1; M_cpd00810_c is "Orotidylic acid";
  // FORMULA: C5H5N2O4
  // CHARGE: -1
  species $M_cpd00282_c in c = 1; M_cpd00282_c is "S-Dihydroorotate";
  // FORMULA: C9H13N3O7P
  // CHARGE: -1
  species $M_cpd00206_c in c = 1; M_cpd00206_c is "dCMP";
  // FORMULA: C10H14N2O14P3
  // CHARGE: -3
  species $M_cpd00357_c in c = 1; M_cpd00357_c is "TTP";

  // Parameters:
  LOWER_BOUND_rxn05289 = -1000;
  UPPER_BOUND_rxn05289 = 1000;
  LOWER_BOUND_rxn06076 = 0;
  UPPER_BOUND_rxn06076 = 1000;
  LOWER_BOUND_rxn06075 = 0;
  UPPER_BOUND_rxn06075 = 1000;
  LOWER_BOUND_rxn00711 = 0;
  UPPER_BOUND_rxn00711 = 1000;
  LOWER_BOUND_rxn00776 = 0;
  UPPER_BOUND_rxn00776 = 1000;
  LOWER_BOUND_rxn01520 = 0;
  UPPER_BOUND_rxn01520 = 1000;
  LOWER_BOUND_rxn01018 = 0;
  UPPER_BOUND_rxn01018 = 1000;
  LOWER_BOUND_rxn00717 = 0;
  UPPER_BOUND_rxn00717 = 1000;
  LOWER_BOUND_rxn00710 = 0;
  UPPER_BOUND_rxn00710 = 1000;
  LOWER_BOUND_rxn01513 = -1000;
  UPPER_BOUND_rxn01513 = 1000;
  LOWER_BOUND_rxn01360 = 0;
  UPPER_BOUND_rxn01360 = 1000;
  LOWER_BOUND_rxn08335 = -1000;
  UPPER_BOUND_rxn08335 = 1000;
  LOWER_BOUND_rJB00259 = -1000;
  UPPER_BOUND_rJB00259 = 1000;
  LOWER_BOUND_rxn08336 = 0;
  UPPER_BOUND_rxn08336 = 0;
  LOWER_BOUND_rxn00364 = -1000;
  UPPER_BOUND_rxn00364 = 1000;
  LOWER_BOUND_rxn01219 = -1000;
  UPPER_BOUND_rxn01219 = 1000;
  LOWER_BOUND_rxn01672 = 0;
  UPPER_BOUND_rxn01672 = 1000;
  LOWER_BOUND_rxn01465 = -1000;
  UPPER_BOUND_rxn01465 = 1000;
  LOWER_BOUND_rxn00363 = 0;
  UPPER_BOUND_rxn00363 = 1000;
  LOWER_BOUND_rxn01218 = 0;
  UPPER_BOUND_rxn01218 = 1000;
  LOWER_BOUND_rxn01145 = 0;
  UPPER_BOUND_rxn01145 = 1000;
  LOWER_BOUND_rxn00708 = 0;
  UPPER_BOUND_rxn00708 = 1000;
  LOWER_BOUND_rxn00412 = 0;
  UPPER_BOUND_rxn00412 = 1000;
  LOWER_BOUND_rxn00410 = -1000;
  UPPER_BOUND_rxn00410 = 1000;
  LOWER_BOUND_rxn00119 = -1000;
  UPPER_BOUND_rxn00119 = 1000;
  LOWER_BOUND_rxn01517 = -1000;
  UPPER_BOUND_rxn01517 = 1000;
  LOWER_BOUND_rxn00409 = -1000;
  UPPER_BOUND_rxn00409 = 1000;
  LOWER_BOUND_rxn01673 = -1000;
  UPPER_BOUND_rxn01673 = 1000;
  LOWER_BOUND_rxn01512 = -1000;
  UPPER_BOUND_rxn01512 = 1000;
  LOWER_BOUND_rxn01678 = -1000;
  UPPER_BOUND_rxn01678 = 1000;
  LOWER_BOUND_rxn00117 = -1000;
  UPPER_BOUND_rxn00117 = 1000;
  LOWER_BOUND_rxn01514 = 0;
  UPPER_BOUND_rxn01514 = 1000;
  LOWER_BOUND_rxn01519 = 0;
  UPPER_BOUND_rxn01519 = 1000;
  LOWER_BOUND_rxn01362 = -1000;
  UPPER_BOUND_rxn01362 = 1000;
  kG_M_cpd11421_c = 1 dimensionless; kG_M_cpd11421_c is "Energy constant of species trdrd";
  kG_M_cpd00096_c = 1 dimensionless; kG_M_cpd00096_c is "Energy constant of species CDP";
  kG_M_cpd00001_c = 1 dimensionless; kG_M_cpd00001_c is "Energy constant of species H2O";
  kG_M_cpd11420_c = 1 dimensionless; kG_M_cpd11420_c is "Energy constant of species trdox";
  kG_M_cpd00533_c = 1 dimensionless; kG_M_cpd00533_c is "Energy constant of species dCDP";
  kG_M_cpd00014_c = 1 dimensionless; kG_M_cpd00014_c is "Energy constant of species UDP";
  kG_M_cpd00978_c = 1 dimensionless; kG_M_cpd00978_c is "Energy constant of species dUDP";
  kG_M_cpd00041_c = 1 dimensionless; kG_M_cpd00041_c is "Energy constant of species L-Aspartate";
  kG_M_cpd00146_c = 1 dimensionless; kG_M_cpd00146_c is "Energy constant of species Carbamoylphosphate";
  kG_M_cpd00067_c = 1 dimensionless; kG_M_cpd00067_c is "Energy constant of species H+";
  kG_M_cpd00009_c = 1 dimensionless; kG_M_cpd00009_c is "Energy constant of species Phosphate";
  kG_M_cpd00343_c = 1 dimensionless; kG_M_cpd00343_c is "Energy constant of species N-Carbamoyl-L-aspartate";
  kG_M_cpd00307_c = 1 dimensionless; kG_M_cpd00307_c is "Energy constant of species Cytosine";
  kG_M_cpd00013_c = 1 dimensionless; kG_M_cpd00013_c is "Energy constant of species NH3";
  kG_M_cpd00092_c = 1 dimensionless; kG_M_cpd00092_c is "Energy constant of species Uracil";
  kG_M_cpd00356_c = 1 dimensionless; kG_M_cpd00356_c is "Energy constant of species dCTP";
  kG_M_cpd00358_c = 1 dimensionless; kG_M_cpd00358_c is "Energy constant of species dUTP";
  kG_M_cpd00046_c = 1 dimensionless; kG_M_cpd00046_c is "Energy constant of species CMP";
  kG_M_cpd00367_c = 1 dimensionless; kG_M_cpd00367_c is "Energy constant of species Cytidine";
  kG_M_cpd00206_c = 1 dimensionless; kG_M_cpd00206_c is "Energy constant of species dCMP";
  kG_M_cpd00654_c = 1 dimensionless; kG_M_cpd00654_c is "Energy constant of species Deoxycytidine";
  kG_M_cpd00298_c = 1 dimensionless; kG_M_cpd00298_c is "Energy constant of species dTMP";
  kG_M_cpd00184_c = 1 dimensionless; kG_M_cpd00184_c is "Energy constant of species Thymidine";
  kG_M_cpd00091_c = 1 dimensionless; kG_M_cpd00091_c is "Energy constant of species UMP";
  kG_M_cpd00249_c = 1 dimensionless; kG_M_cpd00249_c is "Energy constant of species Uridine";
  kG_M_cpd00002_c = 1 dimensionless; kG_M_cpd00002_c is "Energy constant of species ATP";
  kG_M_cpd00053_c = 1 dimensionless; kG_M_cpd00053_c is "Energy constant of species L-Glutamine";
  kG_M_cpd00062_c = 1 dimensionless; kG_M_cpd00062_c is "Energy constant of species UTP";
  kG_M_cpd00008_c = 1 dimensionless; kG_M_cpd00008_c is "Energy constant of species ADP";
  kG_M_cpd00023_c = 1 dimensionless; kG_M_cpd00023_c is "Energy constant of species L-Glutamate";
  kG_M_cpd00052_c = 1 dimensionless; kG_M_cpd00052_c is "Energy constant of species CTP";
  kG_M_cpd00357_c = 1 dimensionless; kG_M_cpd00357_c is "Energy constant of species TTP";
  kG_M_cpd00297_c = 1 dimensionless; kG_M_cpd00297_c is "Energy constant of species dTDP";

  // Rate rules:
  M_cpd00041_c' = -28;
  M_cpd00052_c' = 31;
  M_cpd00091_c' = 34;
  M_cpd00247_c' = 91;
  M_cpd00012_c' = 32;
  M_cpd00859_c' = 30;
  M_cpd15560_c' = -23;
  M_cpd01351_c' = -22;
  M_cpd00206_c' = -34;
  M_cpd00002_c' = -136;
  M_cpd00249_c' = 13;
  M_cpd00184_c' = 14;
  M_cpd00810_c' = -27;
  M_cpd00006_c' = 34;
  M_cpd00007_c' = -24;
  M_cpd00125_c' = -29;
  M_cpd00046_c' = -36;
  M_cpd00654_c' = 15;
  M_cpd00025_c' = 24;
  M_cpd00357_c' = 3;
  M_cpd00282_c' = -107;
  M_cpd00367_c' = 16;
  M_cpd00146_c' = -28;
  M_cpd15499_c' = 21;
  M_cpd00356_c' = -11;
  M_cpd15500_c' = -21;
  M_cpd00330_c' = 29;
  M_cpd00092_c' = -34;
  M_cpd00008_c' = 136;
  M_cpd11421_c' = -31;
  M_cpd00053_c' = -12;
  M_cpd00533_c' = 45;
  M_cpd00005_c' = -34;
  M_cpd11420_c' = 31;
  M_cpd00009_c' = 112;
  M_cpd00013_c' = 34;
  M_cpd00978_c' = 36;
  M_cpd00307_c' = -27;
  M_cpd00023_c' = 12;
  M_cpd00297_c' = 22;
  M_cpd00014_c' = -26;
  M_cpd00011_c' = 26;
  M_cpd00343_c' = 45;
  M_cpd00299_c' = -36;
  M_cpd00358_c' = 21;
  M_cpd00062_c' = -19;
  M_cpd00067_c' = 75;
  M_cpd00001_c' = -42;
  M_cpd00096_c' = -21;
  M_cpd00103_c' = -30;
  M_cpd00101_c' = -30;
  M_cpd00298_c' = -10;
  M_cpd15561_c' = 23;
  M_cJB00125_c' = 22;

  // Reactions:
  // GENE_ASSOCIATION: (PA2616 or PA0849)
  // SUBSYSTEM: Pyrimidine metabolism
  // EC Number: 1.6.4.5,1.8.1.9
  // Confidence Level:
  // AUTHORS:
  R_rxn05289: $M_cpd00067_c + $M_cpd00005_c + $M_cpd11420_c -> $M_cpd00006_c + $M_cpd11421_c; (vmaf_R_rxn05289*(M_cpd00067_c*c/kmc_R_rxn05289_M_cpd00067_c)^hco_R_rxn05289*(M_cpd00005_c*c/kmc_R_rxn05289_M_cpd00005_c)^hco_R_rxn05289*(M_cpd11420_c*c/kmc_R_rxn05289_M_cpd11420_c)^hco_R_rxn05289 - vmar_R_rxn05289*(M_cpd00006_c*c/kmc_R_rxn05289_M_cpd00006_c)^hco_R_rxn05289*(M_cpd11421_c*c/kmc_R_rxn05289_M_cpd11421_c)^hco_R_rxn05289)/((1 + M_cpd00067_c*c/kmc_R_rxn05289_M_cpd00067_c)^hco_R_rxn05289*(1 + M_cpd00005_c*c/kmc_R_rxn05289_M_cpd00005_c)^hco_R_rxn05289*(1 + M_cpd11420_c*c/kmc_R_rxn05289_M_cpd11420_c)^hco_R_rxn05289 + (1 + M_cpd00006_c*c/kmc_R_rxn05289_M_cpd00006_c)^hco_R_rxn05289*(1 + M_cpd11421_c*c/kmc_R_rxn05289_M_cpd11421_c)^hco_R_rxn05289 - 1); R_rxn05289 is "thioredoxin reductase (NADPH)";  // hasProperty ec-code:1.6.4.5 ec-code:1.8.1.9
    vmaf_R_rxn05289 = 1 mole_per_second; hco_R_rxn05289 = 1 dimensionless; kmc_R_rxn05289_M_cpd00067_c = 1 substance; kmc_R_rxn05289_M_cpd00005_c = 1 substance; kmc_R_rxn05289_M_cpd11420_c = 1 substance; vmar_R_rxn05289 = 1 mole_per_second; kmc_R_rxn05289_M_cpd00006_c = 1 substance; kmc_R_rxn05289_M_cpd11421_c = 1 substance;
  // Thermodynamically independent convenience kinetics
  // GENE_ASSOCIATION: (PA1156 and PA1155)
  // SUBSYSTEM: Pyrimidine metabolism
  // EC Number: 1.17.4.1
  // Confidence Level:
  // AUTHORS:
  R_rxn06076: $M_cpd11421_c + $M_cpd00096_c => $M_cpd00001_c + $M_cpd11420_c + $M_cpd00533_c; vmag_R_rxn06076*(M_cpd11421_c*c/kmc_R_rxn06076_M_cpd11421_c*(M_cpd00096_c*c/kmc_R_rxn06076_M_cpd00096_c)*sqrt((kG_M_cpd11421_c*kmc_R_rxn06076_M_cpd11421_c)^1*(kG_M_cpd00096_c*kmc_R_rxn06076_M_cpd00096_c)^1/((kG_M_cpd00001_c*kmc_R_rxn06076_M_cpd00001_c)^1*(kG_M_cpd00533_c*kmc_R_rxn06076_M_cpd00533_c)^1*(kG_M_cpd11420_c*kmc_R_rxn06076_M_cpd11420_c)^1))/((1 + M_cpd11421_c*c/kmc_R_rxn06076_M_cpd11421_c)*(1 + M_cpd00096_c*c/kmc_R_rxn06076_M_cpd00096_c))); R_rxn06076 is "ribonucleoside-diphosphate reductase (CDP)";  // hasProperty ec-code:1.17.4.1
    kmc_R_rxn06076_M_cpd11421_c = 1 substance; kmc_R_rxn06076_M_cpd00096_c = 1 substance; kmc_R_rxn06076_M_cpd00001_c = 1 substance; kmc_R_rxn06076_M_cpd11420_c = 1 substance; kmc_R_rxn06076_M_cpd00533_c = 1 substance; vmag_R_rxn06076 = 1 mole_per_second;
  // Thermodynamically independent convenience kinetics
  // GENE_ASSOCIATION: (PA1156 and PA1155)
  // SUBSYSTEM: Pyrimidine metabolism
  // EC Number: 1.17.4.1
  // Confidence Level:
  // AUTHORS:
  R_rxn06075: $M_cpd11421_c + $M_cpd00014_c => $M_cpd00001_c + $M_cpd11420_c + $M_cpd00978_c; vmag_R_rxn06075*(M_cpd11421_c*c/kmc_R_rxn06075_M_cpd11421_c*(M_cpd00014_c*c/kmc_R_rxn06075_M_cpd00014_c)*sqrt((kG_M_cpd11421_c*kmc_R_rxn06075_M_cpd11421_c)^1*(kG_M_cpd00014_c*kmc_R_rxn06075_M_cpd00014_c)^1/((kG_M_cpd00001_c*kmc_R_rxn06075_M_cpd00001_c)^1*(kG_M_cpd00978_c*kmc_R_rxn06075_M_cpd00978_c)^1*(kG_M_cpd11420_c*kmc_R_rxn06075_M_cpd11420_c)^1))/((1 + M_cpd11421_c*c/kmc_R_rxn06075_M_cpd11421_c)*(1 + M_cpd00014_c*c/kmc_R_rxn06075_M_cpd00014_c))); R_rxn06075 is "ribonucleoside-diphosphate reductase (UDP)";  // hasProperty ec-code:1.17.4.1
    kmc_R_rxn06075_M_cpd11421_c = 1 substance; kmc_R_rxn06075_M_cpd00014_c = 1 substance; kmc_R_rxn06075_M_cpd00001_c = 1 substance; kmc_R_rxn06075_M_cpd11420_c = 1 substance; kmc_R_rxn06075_M_cpd00978_c = 1 substance; vmag_R_rxn06075 = 1 mole_per_second;
  // Irreversibel rapid-equilibrium random order ternary-complex mechanism, two products
  // GENE_ASSOCIATION: (PA4646 or PA0403)
  // SUBSYSTEM: Pyrimidine metabolism
  // EC Number: 2.4.2.9
  // Confidence Level:
  // AUTHORS:
  R_rxn00711: $M_cpd00092_c + $M_cpd00103_c => $M_cpd00012_c + $M_cpd00091_c; vmax_R_rxn00711*M_cpd00103_c*c*M_cpd00092_c*c/(kic_R_rxn00711_M_cpd00092_c*kmc_R_rxn00711_M_cpd00103_c + M_cpd00092_c*c*M_cpd00103_c*c + kmc_R_rxn00711_M_cpd00103_c*M_cpd00092_c*c + kmc_R_rxn00711_M_cpd00092_c*M_cpd00103_c*c); R_rxn00711 is "uracil phosphoribosyltransferase";  // hasProperty ec-code:2.4.2.9
    vmax_R_rxn00711 = 1 mole_per_second; kmc_R_rxn00711_M_cpd00092_c = 1 substance; kmc_R_rxn00711_M_cpd00103_c = 1 substance; kic_R_rxn00711_M_cpd00092_c = 1 substance;
  // Irreversibel rapid-equilibrium random order ternary-complex mechanism, two products
  // GENE_ASSOCIATION: (PA4742 or PA2975 or PA3246 or PA3114 or PA4544)
  // SUBSYSTEM: Pyrimidine metabolism
  // EC Number: 4.2.1.70
  // Confidence Level:
  // AUTHORS:
  R_rxn00776: $M_cpd00092_c + $M_cpd00101_c => $M_cpd00001_c + $M_cpd00859_c; vmax_R_rxn00776*M_cpd00101_c*c*M_cpd00092_c*c/(kic_R_rxn00776_M_cpd00092_c*kmc_R_rxn00776_M_cpd00101_c + M_cpd00092_c*c*M_cpd00101_c*c + kmc_R_rxn00776_M_cpd00101_c*M_cpd00092_c*c + kmc_R_rxn00776_M_cpd00092_c*M_cpd00101_c*c); R_rxn00776 is "yUMP synthetase";  // hasProperty ec-code:4.2.1.70
    vmax_R_rxn00776 = 1 mole_per_second; kmc_R_rxn00776_M_cpd00092_c = 1 substance; kmc_R_rxn00776_M_cpd00101_c = 1 substance; kic_R_rxn00776_M_cpd00092_c = 1 substance;
  // Irreversibel rapid-equilibrium random order ternary-complex mechanism, two products
  // GENE_ASSOCIATION: PA0342
  // SUBSYSTEM: Pyrimidine metabolism
  // EC Number: 2.1.1.45
  // Confidence Level:
  // AUTHORS:
  R_rxn01520: $M_cpd00125_c + $M_cpd00299_c => $M_cpd00330_c + $M_cpd00298_c; vmax_R_rxn01520*M_cpd00299_c*c*M_cpd00125_c*c/(kic_R_rxn01520_M_cpd00125_c*kmc_R_rxn01520_M_cpd00299_c + M_cpd00125_c*c*M_cpd00299_c*c + kmc_R_rxn01520_M_cpd00299_c*M_cpd00125_c*c + kmc_R_rxn01520_M_cpd00125_c*M_cpd00299_c*c); R_rxn01520 is "thymidylate synthase";  // hasProperty ec-code:2.1.1.45
    vmax_R_rxn01520 = 1 mole_per_second; kmc_R_rxn01520_M_cpd00125_c = 1 substance; kmc_R_rxn01520_M_cpd00299_c = 1 substance; kic_R_rxn01520_M_cpd00125_c = 1 substance;
  // Thermodynamically independent convenience kinetics
  // GENE_ASSOCIATION: PA0402
  // SUBSYSTEM: Pyrimidine metabolism
  // EC Number: 2.1.3.2
  // Confidence Level:
  // AUTHORS:
  R_rxn01018: $M_cpd00041_c + $M_cpd00146_c => 2 $M_cpd00067_c + $M_cpd00009_c + $M_cpd00343_c; vmag_R_rxn01018*(M_cpd00041_c*c/kmc_R_rxn01018_M_cpd00041_c*(M_cpd00146_c*c/kmc_R_rxn01018_M_cpd00146_c)*sqrt((kG_M_cpd00041_c*kmc_R_rxn01018_M_cpd00041_c)^1*(kG_M_cpd00146_c*kmc_R_rxn01018_M_cpd00146_c)^1/((kG_M_cpd00067_c*kmc_R_rxn01018_M_cpd00067_c)^2*(kG_M_cpd00343_c*kmc_R_rxn01018_M_cpd00343_c)^1*(kG_M_cpd00009_c*kmc_R_rxn01018_M_cpd00009_c)^1))/((1 + M_cpd00041_c*c/kmc_R_rxn01018_M_cpd00041_c)*(1 + M_cpd00146_c*c/kmc_R_rxn01018_M_cpd00146_c))); R_rxn01018 is "aspartate carbamoyltransferase";  // hasProperty ec-code:2.1.3.2
    kmc_R_rxn01018_M_cpd00041_c = 1 substance; kmc_R_rxn01018_M_cpd00146_c = 1 substance; kmc_R_rxn01018_M_cpd00067_c = 1 substance; kmc_R_rxn01018_M_cpd00009_c = 1 substance; kmc_R_rxn01018_M_cpd00343_c = 1 substance; vmag_R_rxn01018 = 1 mole_per_second;
  // Thermodynamically independent convenience kinetics
  // GENE_ASSOCIATION: PA0437
  // SUBSYSTEM: Pyrimidine metabolism
  // EC Number: 3.5.4.1
  // Confidence Level:
  // AUTHORS:
  R_rxn00717: $M_cpd00067_c + $M_cpd00001_c + $M_cpd00307_c => $M_cpd00013_c + $M_cpd00092_c; vmag_R_rxn00717*(M_cpd00067_c*c/kmc_R_rxn00717_M_cpd00067_c*(M_cpd00307_c*c/kmc_R_rxn00717_M_cpd00307_c)*(M_cpd00001_c*c/kmc_R_rxn00717_M_cpd00001_c)*sqrt((kG_M_cpd00067_c*kmc_R_rxn00717_M_cpd00067_c)^1*(kG_M_cpd00307_c*kmc_R_rxn00717_M_cpd00307_c)^1*(kG_M_cpd00001_c*kmc_R_rxn00717_M_cpd00001_c)^1/((kG_M_cpd00013_c*kmc_R_rxn00717_M_cpd00013_c)^1*(kG_M_cpd00092_c*kmc_R_rxn00717_M_cpd00092_c)^1))/((1 + M_cpd00067_c*c/kmc_R_rxn00717_M_cpd00067_c)*(1 + M_cpd00307_c*c/kmc_R_rxn00717_M_cpd00307_c)*(1 + M_cpd00001_c*c/kmc_R_rxn00717_M_cpd00001_c))); R_rxn00717 is "Cytosine deaminase";  // hasProperty ec-code:3.5.4.1
    kmc_R_rxn00717_M_cpd00067_c = 1 substance; kmc_R_rxn00717_M_cpd00001_c = 1 substance; kmc_R_rxn00717_M_cpd00307_c = 1 substance; kmc_R_rxn00717_M_cpd00013_c = 1 substance; kmc_R_rxn00717_M_cpd00092_c = 1 substance; vmag_R_rxn00717 = 1 mole_per_second;
  // Irreversibel rapid-equilibrium random order ternary-complex mechanism, two products
  // GENE_ASSOCIATION: PA2876
  // SUBSYSTEM: Pyrimidine metabolism
  // EC Number: 4.1.1.23
  // Confidence Level:
  // AUTHORS:
  R_rxn00710: $M_cpd00067_c + $M_cpd00810_c => $M_cpd00011_c + $M_cpd00091_c; vmax_R_rxn00710*M_cpd00810_c*c*M_cpd00067_c*c/(kic_R_rxn00710_M_cpd00067_c*kmc_R_rxn00710_M_cpd00810_c + M_cpd00067_c*c*M_cpd00810_c*c + kmc_R_rxn00710_M_cpd00810_c*M_cpd00067_c*c + kmc_R_rxn00710_M_cpd00067_c*M_cpd00810_c*c); R_rxn00710 is "orotidine-5'-phosphate decarboxylase";  // hasProperty ec-code:4.1.1.23
    vmax_R_rxn00710 = 1 mole_per_second; kmc_R_rxn00710_M_cpd00067_c = 1 substance; kmc_R_rxn00710_M_cpd00810_c = 1 substance; kic_R_rxn00710_M_cpd00067_c = 1 substance;
  // Reversibel rapid-equilibrium random order ternary-complex mechanism, two products
  // GENE_ASSOCIATION: PA2962
  // SUBSYSTEM: Pyrimidine metabolism
  // EC Number: 2.7.4.12,2.7.4.9
  // Confidence Level:
  // AUTHORS:
  R_rxn01513: $M_cpd00002_c + $M_cpd00298_c -> $M_cpd00008_c + $M_cpd00297_c; (vmaf_R_rxn01513/(kic_R_rxn01513_M_cpd00002_c*kmc_R_rxn01513_M_cpd00298_c)*M_cpd00002_c*c*M_cpd00298_c*c - vmar_R_rxn01513/(kic_R_rxn01513_M_cpd00297_c*kmc_R_rxn01513_M_cpd00008_c)*M_cpd00008_c*c*M_cpd00297_c*c)/(1 + M_cpd00002_c*c*M_cpd00298_c*c/(kic_R_rxn01513_M_cpd00002_c*kmc_R_rxn01513_M_cpd00298_c) + M_cpd00002_c*c/kic_R_rxn01513_M_cpd00002_c + M_cpd00008_c*c*M_cpd00297_c*c/(kic_R_rxn01513_M_cpd00297_c*kmc_R_rxn01513_M_cpd00008_c) + M_cpd00298_c*c/kic_R_rxn01513_M_cpd00298_c + M_cpd00297_c*c/kic_R_rxn01513_M_cpd00297_c + M_cpd00008_c*c/kic_R_rxn01513_M_cpd00008_c); R_rxn01513 is "dTMP kinase";  // hasProperty ec-code:2.7.4.12 ec-code:2.7.4.9
    vmaf_R_rxn01513 = 1 mole_per_second; vmar_R_rxn01513 = 1 mole_per_second; kmc_R_rxn01513_M_cpd00298_c = 1 substance; kmc_R_rxn01513_M_cpd00008_c = 1 substance; kic_R_rxn01513_M_cpd00008_c = 1 substance; kic_R_rxn01513_M_cpd00297_c = 1 substance; kic_R_rxn01513_M_cpd00002_c = 1 substance; kic_R_rxn01513_M_cpd00298_c = 1 substance;
  // Irreversibel rapid-equilibrium random order ternary-complex mechanism, two products
  // GENE_ASSOCIATION: PA3050
  // SUBSYSTEM: Pyrimidine metabolism
  // EC Number: 1.3.3.1,1.3.99.11
  // Confidence Level:
  // AUTHORS:
  R_rxn01360: $M_cpd00007_c + $M_cpd00282_c => $M_cpd00025_c + $M_cpd00247_c; vmax_R_rxn01360*M_cpd00282_c*c*M_cpd00007_c*c/(kic_R_rxn01360_M_cpd00007_c*kmc_R_rxn01360_M_cpd00282_c + M_cpd00007_c*c*M_cpd00282_c*c + kmc_R_rxn01360_M_cpd00282_c*M_cpd00007_c*c + kmc_R_rxn01360_M_cpd00007_c*M_cpd00282_c*c); R_rxn01360 is "(S)-Dihydroorotateoxygen oxidoreductase";  // hasProperty ec-code:1.3.3.1 ec-code:1.3.99.11
    vmax_R_rxn01360 = 1 mole_per_second; kmc_R_rxn01360_M_cpd00007_c = 1 substance; kmc_R_rxn01360_M_cpd00282_c = 1 substance; kic_R_rxn01360_M_cpd00007_c = 1 substance;
  // Reversibel rapid-equilibrium random order ternary-complex mechanism, two products
  // GENE_ASSOCIATION: PA3050
  // SUBSYSTEM: Pyrimidine metabolism
  // Confidence Level:
  // AUTHORS:
  R_rxn08335: $M_cpd15560_c + $M_cpd00282_c -> $M_cpd15561_c + $M_cpd00247_c; (vmaf_R_rxn08335/(kic_R_rxn08335_M_cpd15560_c*kmc_R_rxn08335_M_cpd00282_c)*M_cpd15560_c*c*M_cpd00282_c*c - vmar_R_rxn08335/(kic_R_rxn08335_M_cpd00247_c*kmc_R_rxn08335_M_cpd15561_c)*M_cpd15561_c*c*M_cpd00247_c*c)/(1 + M_cpd15560_c*c*M_cpd00282_c*c/(kic_R_rxn08335_M_cpd15560_c*kmc_R_rxn08335_M_cpd00282_c) + M_cpd15560_c*c/kic_R_rxn08335_M_cpd15560_c + M_cpd15561_c*c*M_cpd00247_c*c/(kic_R_rxn08335_M_cpd00247_c*kmc_R_rxn08335_M_cpd15561_c) + M_cpd00282_c*c/kic_R_rxn08335_M_cpd00282_c + M_cpd00247_c*c/kic_R_rxn08335_M_cpd00247_c + M_cpd15561_c*c/kic_R_rxn08335_M_cpd15561_c); R_rxn08335 is "dihydoorotic acid dehydrogenase (quinone8)";
    vmaf_R_rxn08335 = 1 mole_per_second; vmar_R_rxn08335 = 1 mole_per_second; kmc_R_rxn08335_M_cpd00282_c = 1 substance; kmc_R_rxn08335_M_cpd15561_c = 1 substance; kic_R_rxn08335_M_cpd15561_c = 1 substance; kic_R_rxn08335_M_cpd00247_c = 1 substance; kic_R_rxn08335_M_cpd15560_c = 1 substance; kic_R_rxn08335_M_cpd00282_c = 1 substance;
  // Reversibel rapid-equilibrium random order ternary-complex mechanism, two products
  // GENE_ASSOCIATION: PA3050
  // SUBSYSTEM: Pyrimidine metabolism
  // Confidence Level:
  // AUTHORS:
  R_rJB00259: $M_cpd01351_c + $M_cpd00282_c -> $M_cJB00125_c + $M_cpd00247_c; (vmaf_R_rJB00259/(kic_R_rJB00259_M_cpd01351_c*kmc_R_rJB00259_M_cpd00282_c)*M_cpd01351_c*c*M_cpd00282_c*c - vmar_R_rJB00259/(kic_R_rJB00259_M_cpd00247_c*kmc_R_rJB00259_M_cJB00125_c)*M_cJB00125_c*c*M_cpd00247_c*c)/(1 + M_cpd01351_c*c*M_cpd00282_c*c/(kic_R_rJB00259_M_cpd01351_c*kmc_R_rJB00259_M_cpd00282_c) + M_cpd01351_c*c/kic_R_rJB00259_M_cpd01351_c + M_cJB00125_c*c*M_cpd00247_c*c/(kic_R_rJB00259_M_cpd00247_c*kmc_R_rJB00259_M_cJB00125_c) + M_cpd00282_c*c/kic_R_rJB00259_M_cpd00282_c + M_cpd00247_c*c/kic_R_rJB00259_M_cpd00247_c + M_cJB00125_c*c/kic_R_rJB00259_M_cJB00125_c); R_rJB00259 is "dihydoorotic acid dehydrogenase (quinone9)";
    vmaf_R_rJB00259 = 1 mole_per_second; vmar_R_rJB00259 = 1 mole_per_second; kmc_R_rJB00259_M_cpd00282_c = 1 substance; kmc_R_rJB00259_M_cJB00125_c = 1 substance; kic_R_rJB00259_M_cJB00125_c = 1 substance; kic_R_rJB00259_M_cpd00247_c = 1 substance; kic_R_rJB00259_M_cpd01351_c = 1 substance; kic_R_rJB00259_M_cpd00282_c = 1 substance;
  // Irreversibel rapid-equilibrium random order ternary-complex mechanism, two products
  // GENE_ASSOCIATION: PA3050
  // SUBSYSTEM: Pyrimidine metabolism
  // EC Number: 1.3.3.1
  // Confidence Level:
  // AUTHORS:
  R_rxn08336: $M_cpd15500_c + $M_cpd00282_c => $M_cpd00247_c + $M_cpd15499_c; vmax_R_rxn08336*M_cpd00282_c*c*M_cpd15500_c*c/(kic_R_rxn08336_M_cpd15500_c*kmc_R_rxn08336_M_cpd00282_c + M_cpd15500_c*c*M_cpd00282_c*c + kmc_R_rxn08336_M_cpd00282_c*M_cpd15500_c*c + kmc_R_rxn08336_M_cpd15500_c*M_cpd00282_c*c); R_rxn08336 is "dihydroorotic acid (menaquinone-8)";  // hasProperty ec-code:1.3.3.1
    vmax_R_rxn08336 = 1 mole_per_second; kmc_R_rxn08336_M_cpd15500_c = 1 substance; kmc_R_rxn08336_M_cpd00282_c = 1 substance; kic_R_rxn08336_M_cpd15500_c = 1 substance;
  // Reversibel rapid-equilibrium random order ternary-complex mechanism, two products
  // GENE_ASSOCIATION: PA3163
  // SUBSYSTEM: Pyrimidine metabolism
  // EC Number: 2.7.4.14
  // Confidence Level:
  // AUTHORS:
  R_rxn00364: $M_cpd00002_c + $M_cpd00046_c -> $M_cpd00008_c + $M_cpd00096_c; (vmaf_R_rxn00364/(kic_R_rxn00364_M_cpd00002_c*kmc_R_rxn00364_M_cpd00046_c)*M_cpd00002_c*c*M_cpd00046_c*c - vmar_R_rxn00364/(kic_R_rxn00364_M_cpd00096_c*kmc_R_rxn00364_M_cpd00008_c)*M_cpd00008_c*c*M_cpd00096_c*c)/(1 + M_cpd00002_c*c*M_cpd00046_c*c/(kic_R_rxn00364_M_cpd00002_c*kmc_R_rxn00364_M_cpd00046_c) + M_cpd00002_c*c/kic_R_rxn00364_M_cpd00002_c + M_cpd00008_c*c*M_cpd00096_c*c/(kic_R_rxn00364_M_cpd00096_c*kmc_R_rxn00364_M_cpd00008_c) + M_cpd00046_c*c/kic_R_rxn00364_M_cpd00046_c + M_cpd00096_c*c/kic_R_rxn00364_M_cpd00096_c + M_cpd00008_c*c/kic_R_rxn00364_M_cpd00008_c); R_rxn00364 is "cytidylate kinase (CMP)";  // hasProperty ec-code:2.7.4.14
    vmaf_R_rxn00364 = 1 mole_per_second; vmar_R_rxn00364 = 1 mole_per_second; kmc_R_rxn00364_M_cpd00046_c = 1 substance; kmc_R_rxn00364_M_cpd00008_c = 1 substance; kic_R_rxn00364_M_cpd00008_c = 1 substance; kic_R_rxn00364_M_cpd00096_c = 1 substance; kic_R_rxn00364_M_cpd00002_c = 1 substance; kic_R_rxn00364_M_cpd00046_c = 1 substance;
  // Reversibel rapid-equilibrium random order ternary-complex mechanism, two products
  // GENE_ASSOCIATION: PA3163
  // SUBSYSTEM: Pyrimidine metabolism
  // EC Number: 2.7.4.14
  // Confidence Level:
  // AUTHORS:
  R_rxn01219: $M_cpd00002_c + $M_cpd00206_c -> $M_cpd00008_c + $M_cpd00533_c; (vmaf_R_rxn01219/(kic_R_rxn01219_M_cpd00002_c*kmc_R_rxn01219_M_cpd00206_c)*M_cpd00002_c*c*M_cpd00206_c*c - vmar_R_rxn01219/(kic_R_rxn01219_M_cpd00533_c*kmc_R_rxn01219_M_cpd00008_c)*M_cpd00008_c*c*M_cpd00533_c*c)/(1 + M_cpd00002_c*c*M_cpd00206_c*c/(kic_R_rxn01219_M_cpd00002_c*kmc_R_rxn01219_M_cpd00206_c) + M_cpd00002_c*c/kic_R_rxn01219_M_cpd00002_c + M_cpd00008_c*c*M_cpd00533_c*c/(kic_R_rxn01219_M_cpd00533_c*kmc_R_rxn01219_M_cpd00008_c) + M_cpd00206_c*c/kic_R_rxn01219_M_cpd00206_c + M_cpd00533_c*c/kic_R_rxn01219_M_cpd00533_c + M_cpd00008_c*c/kic_R_rxn01219_M_cpd00008_c); R_rxn01219 is "cytidylate kinase (dCMP)";  // hasProperty ec-code:2.7.4.14
    vmaf_R_rxn01219 = 1 mole_per_second; vmar_R_rxn01219 = 1 mole_per_second; kmc_R_rxn01219_M_cpd00206_c = 1 substance; kmc_R_rxn01219_M_cpd00008_c = 1 substance; kic_R_rxn01219_M_cpd00008_c = 1 substance; kic_R_rxn01219_M_cpd00533_c = 1 substance; kic_R_rxn01219_M_cpd00002_c = 1 substance; kic_R_rxn01219_M_cpd00206_c = 1 substance;
  // Thermodynamically independent convenience kinetics
  // GENE_ASSOCIATION: PA3480
  // SUBSYSTEM: Pyrimidine metabolism
  // EC Number: 3.5.4.13
  // Confidence Level:
  // AUTHORS:
  R_rxn01672: $M_cpd00067_c + $M_cpd00001_c + $M_cpd00356_c => $M_cpd00013_c + $M_cpd00358_c; vmag_R_rxn01672*(M_cpd00067_c*c/kmc_R_rxn01672_M_cpd00067_c*(M_cpd00356_c*c/kmc_R_rxn01672_M_cpd00356_c)*(M_cpd00001_c*c/kmc_R_rxn01672_M_cpd00001_c)*sqrt((kG_M_cpd00067_c*kmc_R_rxn01672_M_cpd00067_c)^1*(kG_M_cpd00356_c*kmc_R_rxn01672_M_cpd00356_c)^1*(kG_M_cpd00001_c*kmc_R_rxn01672_M_cpd00001_c)^1/((kG_M_cpd00013_c*kmc_R_rxn01672_M_cpd00013_c)^1*(kG_M_cpd00358_c*kmc_R_rxn01672_M_cpd00358_c)^1))/((1 + M_cpd00067_c*c/kmc_R_rxn01672_M_cpd00067_c)*(1 + M_cpd00356_c*c/kmc_R_rxn01672_M_cpd00356_c)*(1 + M_cpd00001_c*c/kmc_R_rxn01672_M_cpd00001_c))); R_rxn01672 is "dCTP deaminase";  // hasProperty ec-code:3.5.4.13
    kmc_R_rxn01672_M_cpd00067_c = 1 substance; kmc_R_rxn01672_M_cpd00001_c = 1 substance; kmc_R_rxn01672_M_cpd00356_c = 1 substance; kmc_R_rxn01672_M_cpd00013_c = 1 substance; kmc_R_rxn01672_M_cpd00358_c = 1 substance; vmag_R_rxn01672 = 1 mole_per_second;
  // Reversibel rapid-equilibrium random order ternary-complex mechanism, two products
  // GENE_ASSOCIATION: PA3527
  // SUBSYSTEM: Pyrimidine metabolism
  // EC Number: 3.5.2.3
  // Confidence Level:
  // AUTHORS:
  R_rxn01465: $M_cpd00001_c + $M_cpd00282_c -> $M_cpd00067_c + $M_cpd00343_c; (vmaf_R_rxn01465/(kic_R_rxn01465_M_cpd00001_c*kmc_R_rxn01465_M_cpd00282_c)*M_cpd00001_c*c*M_cpd00282_c*c - vmar_R_rxn01465/(kic_R_rxn01465_M_cpd00343_c*kmc_R_rxn01465_M_cpd00067_c)*M_cpd00067_c*c*M_cpd00343_c*c)/(1 + M_cpd00001_c*c*M_cpd00282_c*c/(kic_R_rxn01465_M_cpd00001_c*kmc_R_rxn01465_M_cpd00282_c) + M_cpd00001_c*c/kic_R_rxn01465_M_cpd00001_c + M_cpd00067_c*c*M_cpd00343_c*c/(kic_R_rxn01465_M_cpd00343_c*kmc_R_rxn01465_M_cpd00067_c) + M_cpd00282_c*c/kic_R_rxn01465_M_cpd00282_c + M_cpd00343_c*c/kic_R_rxn01465_M_cpd00343_c + M_cpd00067_c*c/kic_R_rxn01465_M_cpd00067_c); R_rxn01465 is "dihydroorotase";  // hasProperty ec-code:3.5.2.3
    vmaf_R_rxn01465 = 1 mole_per_second; vmar_R_rxn01465 = 1 mole_per_second; kmc_R_rxn01465_M_cpd00282_c = 1 substance; kmc_R_rxn01465_M_cpd00067_c = 1 substance; kic_R_rxn01465_M_cpd00067_c = 1 substance; kic_R_rxn01465_M_cpd00343_c = 1 substance; kic_R_rxn01465_M_cpd00001_c = 1 substance; kic_R_rxn01465_M_cpd00282_c = 1 substance;
  // Thermodynamically independent convenience kinetics
  // GENE_ASSOCIATION: PA3625
  // SUBSYSTEM: Pyrimidine metabolism
  // EC Number: 3.1.3.5
  // Confidence Level:
  // AUTHORS:
  R_rxn00363: $M_cpd00001_c + $M_cpd00046_c => $M_cpd00067_c + $M_cpd00009_c + $M_cpd00367_c; vmag_R_rxn00363*(M_cpd00001_c*c/kmc_R_rxn00363_M_cpd00001_c*(M_cpd00046_c*c/kmc_R_rxn00363_M_cpd00046_c)*sqrt((kG_M_cpd00001_c*kmc_R_rxn00363_M_cpd00001_c)^1*(kG_M_cpd00046_c*kmc_R_rxn00363_M_cpd00046_c)^1/((kG_M_cpd00067_c*kmc_R_rxn00363_M_cpd00067_c)^1*(kG_M_cpd00367_c*kmc_R_rxn00363_M_cpd00367_c)^1*(kG_M_cpd00009_c*kmc_R_rxn00363_M_cpd00009_c)^1))/((1 + M_cpd00001_c*c/kmc_R_rxn00363_M_cpd00001_c)*(1 + M_cpd00046_c*c/kmc_R_rxn00363_M_cpd00046_c))); R_rxn00363 is "5'-nucleotidase (CMP)";  // hasProperty ec-code:3.1.3.5
    kmc_R_rxn00363_M_cpd00001_c = 1 substance; kmc_R_rxn00363_M_cpd00046_c = 1 substance; kmc_R_rxn00363_M_cpd00067_c = 1 substance; kmc_R_rxn00363_M_cpd00009_c = 1 substance; kmc_R_rxn00363_M_cpd00367_c = 1 substance; vmag_R_rxn00363 = 1 mole_per_second;
  // Thermodynamically independent convenience kinetics
  // GENE_ASSOCIATION: PA3625
  // SUBSYSTEM: Pyrimidine metabolism
  // EC Number: 3.1.3.5
  // Confidence Level:
  // AUTHORS:
  R_rxn01218: $M_cpd00001_c + $M_cpd00206_c => $M_cpd00067_c + $M_cpd00009_c + $M_cpd00654_c; vmag_R_rxn01218*(M_cpd00001_c*c/kmc_R_rxn01218_M_cpd00001_c*(M_cpd00206_c*c/kmc_R_rxn01218_M_cpd00206_c)*sqrt((kG_M_cpd00001_c*kmc_R_rxn01218_M_cpd00001_c)^1*(kG_M_cpd00206_c*kmc_R_rxn01218_M_cpd00206_c)^1/((kG_M_cpd00067_c*kmc_R_rxn01218_M_cpd00067_c)^1*(kG_M_cpd00654_c*kmc_R_rxn01218_M_cpd00654_c)^1*(kG_M_cpd00009_c*kmc_R_rxn01218_M_cpd00009_c)^1))/((1 + M_cpd00001_c*c/kmc_R_rxn01218_M_cpd00001_c)*(1 + M_cpd00206_c*c/kmc_R_rxn01218_M_cpd00206_c))); R_rxn01218 is "5'-nucleotidase (dCMP)";  // hasProperty ec-code:3.1.3.5
    kmc_R_rxn01218_M_cpd00001_c = 1 substance; kmc_R_rxn01218_M_cpd00206_c = 1 substance; kmc_R_rxn01218_M_cpd00067_c = 1 substance; kmc_R_rxn01218_M_cpd00009_c = 1 substance; kmc_R_rxn01218_M_cpd00654_c = 1 substance; vmag_R_rxn01218 = 1 mole_per_second;
  // Thermodynamically independent convenience kinetics
  // GENE_ASSOCIATION: PA3625
  // SUBSYSTEM: Pyrimidine metabolism
  // EC Number: 3.1.3.5
  // Confidence Level:
  // AUTHORS:
  R_rxn01145: $M_cpd00001_c + $M_cpd00298_c => $M_cpd00067_c + $M_cpd00009_c + $M_cpd00184_c; vmag_R_rxn01145*(M_cpd00001_c*c/kmc_R_rxn01145_M_cpd00001_c*(M_cpd00298_c*c/kmc_R_rxn01145_M_cpd00298_c)*sqrt((kG_M_cpd00001_c*kmc_R_rxn01145_M_cpd00001_c)^1*(kG_M_cpd00298_c*kmc_R_rxn01145_M_cpd00298_c)^1/((kG_M_cpd00067_c*kmc_R_rxn01145_M_cpd00067_c)^1*(kG_M_cpd00184_c*kmc_R_rxn01145_M_cpd00184_c)^1*(kG_M_cpd00009_c*kmc_R_rxn01145_M_cpd00009_c)^1))/((1 + M_cpd00001_c*c/kmc_R_rxn01145_M_cpd00001_c)*(1 + M_cpd00298_c*c/kmc_R_rxn01145_M_cpd00298_c))); R_rxn01145 is "5'-nucleotidase (dTMP)";  // hasProperty ec-code:3.1.3.5
    kmc_R_rxn01145_M_cpd00001_c = 1 substance; kmc_R_rxn01145_M_cpd00298_c = 1 substance; kmc_R_rxn01145_M_cpd00067_c = 1 substance; kmc_R_rxn01145_M_cpd00009_c = 1 substance; kmc_R_rxn01145_M_cpd00184_c = 1 substance; vmag_R_rxn01145 = 1 mole_per_second;
  // Thermodynamically independent convenience kinetics
  // GENE_ASSOCIATION: PA3625
  // SUBSYSTEM: Pyrimidine metabolism
  // EC Number: 3.1.3.5
  // Confidence Level:
  // AUTHORS:
  R_rxn00708: $M_cpd00001_c + $M_cpd00091_c => $M_cpd00067_c + $M_cpd00009_c + $M_cpd00249_c; vmag_R_rxn00708*(M_cpd00001_c*c/kmc_R_rxn00708_M_cpd00001_c*(M_cpd00091_c*c/kmc_R_rxn00708_M_cpd00091_c)*sqrt((kG_M_cpd00001_c*kmc_R_rxn00708_M_cpd00001_c)^1*(kG_M_cpd00091_c*kmc_R_rxn00708_M_cpd00091_c)^1/((kG_M_cpd00067_c*kmc_R_rxn00708_M_cpd00067_c)^1*(kG_M_cpd00249_c*kmc_R_rxn00708_M_cpd00249_c)^1*(kG_M_cpd00009_c*kmc_R_rxn00708_M_cpd00009_c)^1))/((1 + M_cpd00001_c*c/kmc_R_rxn00708_M_cpd00001_c)*(1 + M_cpd00091_c*c/kmc_R_rxn00708_M_cpd00091_c))); R_rxn00708 is "5'-nucleotidase (UMP)";  // hasProperty ec-code:3.1.3.5
    kmc_R_rxn00708_M_cpd00001_c = 1 substance; kmc_R_rxn00708_M_cpd00091_c = 1 substance; kmc_R_rxn00708_M_cpd00067_c = 1 substance; kmc_R_rxn00708_M_cpd00009_c = 1 substance; kmc_R_rxn00708_M_cpd00249_c = 1 substance; vmag_R_rxn00708 = 1 mole_per_second;
  // Thermodynamically independent convenience kinetics
  // GENE_ASSOCIATION: PA3637
  // SUBSYSTEM: Pyrimidine metabolism
  // EC Number: 6.3.4.2
  // Confidence Level:
  // AUTHORS:
  R_rxn00412: $M_cpd00001_c + $M_cpd00002_c + $M_cpd00053_c + $M_cpd00062_c => 2 $M_cpd00067_c + $M_cpd00009_c + $M_cpd00008_c + $M_cpd00023_c + $M_cpd00052_c; vmag_R_rxn00412*(M_cpd00001_c*c/kmc_R_rxn00412_M_cpd00001_c*(M_cpd00062_c*c/kmc_R_rxn00412_M_cpd00062_c)*(M_cpd00002_c*c/kmc_R_rxn00412_M_cpd00002_c)*(M_cpd00053_c*c/kmc_R_rxn00412_M_cpd00053_c)*sqrt((kG_M_cpd00001_c*kmc_R_rxn00412_M_cpd00001_c)^1*(kG_M_cpd00062_c*kmc_R_rxn00412_M_cpd00062_c)^1*(kG_M_cpd00002_c*kmc_R_rxn00412_M_cpd00002_c)^1*(kG_M_cpd00053_c*kmc_R_rxn00412_M_cpd00053_c)^1/((kG_M_cpd00067_c*kmc_R_rxn00412_M_cpd00067_c)^2*(kG_M_cpd00052_c*kmc_R_rxn00412_M_cpd00052_c)^1*(kG_M_cpd00009_c*kmc_R_rxn00412_M_cpd00009_c)^1*(kG_M_cpd00023_c*kmc_R_rxn00412_M_cpd00023_c)^1*(kG_M_cpd00008_c*kmc_R_rxn00412_M_cpd00008_c)^1))/((1 + M_cpd00001_c*c/kmc_R_rxn00412_M_cpd00001_c)*(1 + M_cpd00062_c*c/kmc_R_rxn00412_M_cpd00062_c)*(1 + M_cpd00002_c*c/kmc_R_rxn00412_M_cpd00002_c)*(1 + M_cpd00053_c*c/kmc_R_rxn00412_M_cpd00053_c))); R_rxn00412 is "CTP synthase (glutamine)";  // hasProperty ec-code:6.3.4.2
    kmc_R_rxn00412_M_cpd00001_c = 1 substance; kmc_R_rxn00412_M_cpd00002_c = 1 substance; kmc_R_rxn00412_M_cpd00053_c = 1 substance; kmc_R_rxn00412_M_cpd00062_c = 1 substance; kmc_R_rxn00412_M_cpd00067_c = 1 substance; kmc_R_rxn00412_M_cpd00009_c = 1 substance; kmc_R_rxn00412_M_cpd00008_c = 1 substance; kmc_R_rxn00412_M_cpd00023_c = 1 substance; kmc_R_rxn00412_M_cpd00052_c = 1 substance; vmag_R_rxn00412 = 1 mole_per_second;
  // GENE_ASSOCIATION: PA3637
  // SUBSYSTEM: Pyrimidine metabolism
  // EC Number: 6.3.4.2
  // Confidence Level:
  // AUTHORS:
  R_rxn00410: $M_cpd00002_c + $M_cpd00013_c + $M_cpd00062_c -> 2 $M_cpd00067_c + $M_cpd00009_c + $M_cpd00008_c + $M_cpd00052_c; (vmaf_R_rxn00410*(M_cpd00002_c*c/kmc_R_rxn00410_M_cpd00002_c)^hco_R_rxn00410*(M_cpd00013_c*c/kmc_R_rxn00410_M_cpd00013_c)^hco_R_rxn00410*(M_cpd00062_c*c/kmc_R_rxn00410_M_cpd00062_c)^hco_R_rxn00410 - vmar_R_rxn00410*(M_cpd00067_c*c/kmc_R_rxn00410_M_cpd00067_c)^(2*hco_R_rxn00410)*(M_cpd00009_c*c/kmc_R_rxn00410_M_cpd00009_c)^hco_R_rxn00410*(M_cpd00008_c*c/kmc_R_rxn00410_M_cpd00008_c)^hco_R_rxn00410*(M_cpd00052_c*c/kmc_R_rxn00410_M_cpd00052_c)^hco_R_rxn00410)/((1 + M_cpd00002_c*c/kmc_R_rxn00410_M_cpd00002_c)^hco_R_rxn00410*(1 + M_cpd00013_c*c/kmc_R_rxn00410_M_cpd00013_c)^hco_R_rxn00410*(1 + M_cpd00062_c*c/kmc_R_rxn00410_M_cpd00062_c)^hco_R_rxn00410 + (1 + M_cpd00067_c*c/kmc_R_rxn00410_M_cpd00067_c)^(2*hco_R_rxn00410)*(1 + M_cpd00009_c*c/kmc_R_rxn00410_M_cpd00009_c)^hco_R_rxn00410*(1 + M_cpd00008_c*c/kmc_R_rxn00410_M_cpd00008_c)^hco_R_rxn00410*(1 + M_cpd00052_c*c/kmc_R_rxn00410_M_cpd00052_c)^hco_R_rxn00410 - 1); R_rxn00410 is "UTPammonia ligase(ADP-forming)";  // hasProperty ec-code:6.3.4.2
    vmaf_R_rxn00410 = 1 mole_per_second; hco_R_rxn00410 = 1 dimensionless; kmc_R_rxn00410_M_cpd00002_c = 1 substance; kmc_R_rxn00410_M_cpd00013_c = 1 substance; kmc_R_rxn00410_M_cpd00062_c = 1 substance; vmar_R_rxn00410 = 1 mole_per_second; kmc_R_rxn00410_M_cpd00067_c = 1 substance; kmc_R_rxn00410_M_cpd00009_c = 1 substance; kmc_R_rxn00410_M_cpd00008_c = 1 substance; kmc_R_rxn00410_M_cpd00052_c = 1 substance;
  // Reversibel rapid-equilibrium random order ternary-complex mechanism, two products
  // GENE_ASSOCIATION: PA3654
  // SUBSYSTEM: Pyrimidine metabolism
  // EC Number: 2.7.4.4,2.7.4.14,2.7.4.22,2.7.4.-
  // Confidence Level:
  // AUTHORS:
  R_rxn00119: $M_cpd00002_c + $M_cpd00091_c -> $M_cpd00008_c + $M_cpd00014_c; (vmaf_R_rxn00119/(kic_R_rxn00119_M_cpd00002_c*kmc_R_rxn00119_M_cpd00091_c)*M_cpd00002_c*c*M_cpd00091_c*c - vmar_R_rxn00119/(kic_R_rxn00119_M_cpd00014_c*kmc_R_rxn00119_M_cpd00008_c)*M_cpd00008_c*c*M_cpd00014_c*c)/(1 + M_cpd00002_c*c*M_cpd00091_c*c/(kic_R_rxn00119_M_cpd00002_c*kmc_R_rxn00119_M_cpd00091_c) + M_cpd00002_c*c/kic_R_rxn00119_M_cpd00002_c + M_cpd00008_c*c*M_cpd00014_c*c/(kic_R_rxn00119_M_cpd00014_c*kmc_R_rxn00119_M_cpd00008_c) + M_cpd00091_c*c/kic_R_rxn00119_M_cpd00091_c + M_cpd00014_c*c/kic_R_rxn00119_M_cpd00014_c + M_cpd00008_c*c/kic_R_rxn00119_M_cpd00008_c); R_rxn00119 is "UMP kinase";  // hasProperty ec-code:2.7.4.4 ec-code:2.7.4.14 ec-code:2.7.4.22 ec-code:2.7.4.-
    vmaf_R_rxn00119 = 1 mole_per_second; vmar_R_rxn00119 = 1 mole_per_second; kmc_R_rxn00119_M_cpd00091_c = 1 substance; kmc_R_rxn00119_M_cpd00008_c = 1 substance; kic_R_rxn00119_M_cpd00008_c = 1 substance; kic_R_rxn00119_M_cpd00014_c = 1 substance; kic_R_rxn00119_M_cpd00002_c = 1 substance; kic_R_rxn00119_M_cpd00091_c = 1 substance;
  // Reversibel rapid-equilibrium random order ternary-complex mechanism, two products
  // GENE_ASSOCIATION: PA3654
  // SUBSYSTEM: Pyrimidine metabolism
  // EC Number: 2.7.4.4,2.7.4.9
  // Confidence Level:
  // AUTHORS:
  R_rxn01517: $M_cpd00002_c + $M_cpd00299_c -> $M_cpd00008_c + $M_cpd00978_c; (vmaf_R_rxn01517/(kic_R_rxn01517_M_cpd00002_c*kmc_R_rxn01517_M_cpd00299_c)*M_cpd00002_c*c*M_cpd00299_c*c - vmar_R_rxn01517/(kic_R_rxn01517_M_cpd00978_c*kmc_R_rxn01517_M_cpd00008_c)*M_cpd00008_c*c*M_cpd00978_c*c)/(1 + M_cpd00002_c*c*M_cpd00299_c*c/(kic_R_rxn01517_M_cpd00002_c*kmc_R_rxn01517_M_cpd00299_c) + M_cpd00002_c*c/kic_R_rxn01517_M_cpd00002_c + M_cpd00008_c*c*M_cpd00978_c*c/(kic_R_rxn01517_M_cpd00978_c*kmc_R_rxn01517_M_cpd00008_c) + M_cpd00299_c*c/kic_R_rxn01517_M_cpd00299_c + M_cpd00978_c*c/kic_R_rxn01517_M_cpd00978_c + M_cpd00008_c*c/kic_R_rxn01517_M_cpd00008_c); R_rxn01517 is "uridylate kinase (dUMP)";  // hasProperty ec-code:2.7.4.4 ec-code:2.7.4.9
    vmaf_R_rxn01517 = 1 mole_per_second; vmar_R_rxn01517 = 1 mole_per_second; kmc_R_rxn01517_M_cpd00299_c = 1 substance; kmc_R_rxn01517_M_cpd00008_c = 1 substance; kic_R_rxn01517_M_cpd00008_c = 1 substance; kic_R_rxn01517_M_cpd00978_c = 1 substance; kic_R_rxn01517_M_cpd00002_c = 1 substance; kic_R_rxn01517_M_cpd00299_c = 1 substance;
  // Reversibel rapid-equilibrium random order ternary-complex mechanism, two products
  // GENE_ASSOCIATION: PA3807
  // SUBSYSTEM: Pyrimidine metabolism
  // EC Number: 2.7.4.6
  // Confidence Level:
  // AUTHORS:
  R_rxn00409: $M_cpd00002_c + $M_cpd00096_c -> $M_cpd00008_c + $M_cpd00052_c; (vmaf_R_rxn00409/(kic_R_rxn00409_M_cpd00002_c*kmc_R_rxn00409_M_cpd00096_c)*M_cpd00002_c*c*M_cpd00096_c*c - vmar_R_rxn00409/(kic_R_rxn00409_M_cpd00052_c*kmc_R_rxn00409_M_cpd00008_c)*M_cpd00008_c*c*M_cpd00052_c*c)/(1 + M_cpd00002_c*c*M_cpd00096_c*c/(kic_R_rxn00409_M_cpd00002_c*kmc_R_rxn00409_M_cpd00096_c) + M_cpd00002_c*c/kic_R_rxn00409_M_cpd00002_c + M_cpd00008_c*c*M_cpd00052_c*c/(kic_R_rxn00409_M_cpd00052_c*kmc_R_rxn00409_M_cpd00008_c) + M_cpd00096_c*c/kic_R_rxn00409_M_cpd00096_c + M_cpd00052_c*c/kic_R_rxn00409_M_cpd00052_c + M_cpd00008_c*c/kic_R_rxn00409_M_cpd00008_c); R_rxn00409 is "nucleoside-diphosphate kinase (ATP:CDP)";  // hasProperty ec-code:2.7.4.6
    vmaf_R_rxn00409 = 1 mole_per_second; vmar_R_rxn00409 = 1 mole_per_second; kmc_R_rxn00409_M_cpd00096_c = 1 substance; kmc_R_rxn00409_M_cpd00008_c = 1 substance; kic_R_rxn00409_M_cpd00008_c = 1 substance; kic_R_rxn00409_M_cpd00052_c = 1 substance; kic_R_rxn00409_M_cpd00002_c = 1 substance; kic_R_rxn00409_M_cpd00096_c = 1 substance;
  // Reversibel rapid-equilibrium random order ternary-complex mechanism, two products
  // GENE_ASSOCIATION: PA3807
  // SUBSYSTEM: Pyrimidine metabolism
  // EC Number: 2.7.4.6
  // Confidence Level:
  // AUTHORS:
  R_rxn01673: $M_cpd00002_c + $M_cpd00533_c -> $M_cpd00008_c + $M_cpd00356_c; (vmaf_R_rxn01673/(kic_R_rxn01673_M_cpd00002_c*kmc_R_rxn01673_M_cpd00533_c)*M_cpd00002_c*c*M_cpd00533_c*c - vmar_R_rxn01673/(kic_R_rxn01673_M_cpd00356_c*kmc_R_rxn01673_M_cpd00008_c)*M_cpd00008_c*c*M_cpd00356_c*c)/(1 + M_cpd00002_c*c*M_cpd00533_c*c/(kic_R_rxn01673_M_cpd00002_c*kmc_R_rxn01673_M_cpd00533_c) + M_cpd00002_c*c/kic_R_rxn01673_M_cpd00002_c + M_cpd00008_c*c*M_cpd00356_c*c/(kic_R_rxn01673_M_cpd00356_c*kmc_R_rxn01673_M_cpd00008_c) + M_cpd00533_c*c/kic_R_rxn01673_M_cpd00533_c + M_cpd00356_c*c/kic_R_rxn01673_M_cpd00356_c + M_cpd00008_c*c/kic_R_rxn01673_M_cpd00008_c); R_rxn01673 is "nucleoside-diphosphate kinase (ATP:dCDP)";  // hasProperty ec-code:2.7.4.6
    vmaf_R_rxn01673 = 1 mole_per_second; vmar_R_rxn01673 = 1 mole_per_second; kmc_R_rxn01673_M_cpd00533_c = 1 substance; kmc_R_rxn01673_M_cpd00008_c = 1 substance; kic_R_rxn01673_M_cpd00008_c = 1 substance; kic_R_rxn01673_M_cpd00356_c = 1 substance; kic_R_rxn01673_M_cpd00002_c = 1 substance; kic_R_rxn01673_M_cpd00533_c = 1 substance;
  // Reversibel rapid-equilibrium random order ternary-complex mechanism, two products
  // GENE_ASSOCIATION: PA3807
  // SUBSYSTEM: Pyrimidine metabolism
  // EC Number: 2.7.4.6
  // Confidence Level:
  // AUTHORS:
  R_rxn01512: $M_cpd00002_c + $M_cpd00297_c -> $M_cpd00008_c + $M_cpd00357_c; (vmaf_R_rxn01512/(kic_R_rxn01512_M_cpd00002_c*kmc_R_rxn01512_M_cpd00297_c)*M_cpd00002_c*c*M_cpd00297_c*c - vmar_R_rxn01512/(kic_R_rxn01512_M_cpd00357_c*kmc_R_rxn01512_M_cpd00008_c)*M_cpd00008_c*c*M_cpd00357_c*c)/(1 + M_cpd00002_c*c*M_cpd00297_c*c/(kic_R_rxn01512_M_cpd00002_c*kmc_R_rxn01512_M_cpd00297_c) + M_cpd00002_c*c/kic_R_rxn01512_M_cpd00002_c + M_cpd00008_c*c*M_cpd00357_c*c/(kic_R_rxn01512_M_cpd00357_c*kmc_R_rxn01512_M_cpd00008_c) + M_cpd00297_c*c/kic_R_rxn01512_M_cpd00297_c + M_cpd00357_c*c/kic_R_rxn01512_M_cpd00357_c + M_cpd00008_c*c/kic_R_rxn01512_M_cpd00008_c); R_rxn01512 is "nucleoside-diphosphate kinase (ATP:dTDP)";  // hasProperty ec-code:2.7.4.6
    vmaf_R_rxn01512 = 1 mole_per_second; vmar_R_rxn01512 = 1 mole_per_second; kmc_R_rxn01512_M_cpd00297_c = 1 substance; kmc_R_rxn01512_M_cpd00008_c = 1 substance; kic_R_rxn01512_M_cpd00008_c = 1 substance; kic_R_rxn01512_M_cpd00357_c = 1 substance; kic_R_rxn01512_M_cpd00002_c = 1 substance; kic_R_rxn01512_M_cpd00297_c = 1 substance;
  // Reversibel rapid-equilibrium random order ternary-complex mechanism, two products
  // GENE_ASSOCIATION: PA3807
  // SUBSYSTEM: Pyrimidine metabolism
  // EC Number: 2.7.4.6
  // Confidence Level:
  // AUTHORS:
  R_rxn01678: $M_cpd00002_c + $M_cpd00978_c -> $M_cpd00008_c + $M_cpd00358_c; (vmaf_R_rxn01678/(kic_R_rxn01678_M_cpd00002_c*kmc_R_rxn01678_M_cpd00978_c)*M_cpd00002_c*c*M_cpd00978_c*c - vmar_R_rxn01678/(kic_R_rxn01678_M_cpd00358_c*kmc_R_rxn01678_M_cpd00008_c)*M_cpd00008_c*c*M_cpd00358_c*c)/(1 + M_cpd00002_c*c*M_cpd00978_c*c/(kic_R_rxn01678_M_cpd00002_c*kmc_R_rxn01678_M_cpd00978_c) + M_cpd00002_c*c/kic_R_rxn01678_M_cpd00002_c + M_cpd00008_c*c*M_cpd00358_c*c/(kic_R_rxn01678_M_cpd00358_c*kmc_R_rxn01678_M_cpd00008_c) + M_cpd00978_c*c/kic_R_rxn01678_M_cpd00978_c + M_cpd00358_c*c/kic_R_rxn01678_M_cpd00358_c + M_cpd00008_c*c/kic_R_rxn01678_M_cpd00008_c); R_rxn01678 is "nucleoside-diphosphate kinase (ATP:dUDP)";  // hasProperty ec-code:2.7.4.6
    vmaf_R_rxn01678 = 1 mole_per_second; vmar_R_rxn01678 = 1 mole_per_second; kmc_R_rxn01678_M_cpd00978_c = 1 substance; kmc_R_rxn01678_M_cpd00008_c = 1 substance; kic_R_rxn01678_M_cpd00008_c = 1 substance; kic_R_rxn01678_M_cpd00358_c = 1 substance; kic_R_rxn01678_M_cpd00002_c = 1 substance; kic_R_rxn01678_M_cpd00978_c = 1 substance;
  // Reversibel rapid-equilibrium random order ternary-complex mechanism, two products
  // GENE_ASSOCIATION: PA3807
  // SUBSYSTEM: Pyrimidine metabolism
  // EC Number: 2.7.4.6
  // Confidence Level:
  // AUTHORS:
  R_rxn00117: $M_cpd00002_c + $M_cpd00014_c -> $M_cpd00008_c + $M_cpd00062_c; (vmaf_R_rxn00117/(kic_R_rxn00117_M_cpd00002_c*kmc_R_rxn00117_M_cpd00014_c)*M_cpd00002_c*c*M_cpd00014_c*c - vmar_R_rxn00117/(kic_R_rxn00117_M_cpd00062_c*kmc_R_rxn00117_M_cpd00008_c)*M_cpd00008_c*c*M_cpd00062_c*c)/(1 + M_cpd00002_c*c*M_cpd00014_c*c/(kic_R_rxn00117_M_cpd00002_c*kmc_R_rxn00117_M_cpd00014_c) + M_cpd00002_c*c/kic_R_rxn00117_M_cpd00002_c + M_cpd00008_c*c*M_cpd00062_c*c/(kic_R_rxn00117_M_cpd00062_c*kmc_R_rxn00117_M_cpd00008_c) + M_cpd00014_c*c/kic_R_rxn00117_M_cpd00014_c + M_cpd00062_c*c/kic_R_rxn00117_M_cpd00062_c + M_cpd00008_c*c/kic_R_rxn00117_M_cpd00008_c); R_rxn00117 is "nucleoside-diphosphate kinase (ATP:UDP)";  // hasProperty ec-code:2.7.4.6
    vmaf_R_rxn00117 = 1 mole_per_second; vmar_R_rxn00117 = 1 mole_per_second; kmc_R_rxn00117_M_cpd00014_c = 1 substance; kmc_R_rxn00117_M_cpd00008_c = 1 substance; kic_R_rxn00117_M_cpd00008_c = 1 substance; kic_R_rxn00117_M_cpd00062_c = 1 substance; kic_R_rxn00117_M_cpd00002_c = 1 substance; kic_R_rxn00117_M_cpd00014_c = 1 substance;
  // Thermodynamically independent convenience kinetics
  // GENE_ASSOCIATION: PA5067
  // SUBSYSTEM: Pyrimidine metabolism
  // EC Number: 3.6.1.5, 3.6.1.39
  // Confidence Level:
  // AUTHORS:
  R_rxn01514: $M_cpd00001_c + $M_cpd00357_c => $M_cpd00067_c + $M_cpd00009_c + $M_cpd00297_c; vmag_R_rxn01514*(M_cpd00001_c*c/kmc_R_rxn01514_M_cpd00001_c*(M_cpd00357_c*c/kmc_R_rxn01514_M_cpd00357_c)*sqrt((kG_M_cpd00001_c*kmc_R_rxn01514_M_cpd00001_c)^1*(kG_M_cpd00357_c*kmc_R_rxn01514_M_cpd00357_c)^1/((kG_M_cpd00067_c*kmc_R_rxn01514_M_cpd00067_c)^1*(kG_M_cpd00297_c*kmc_R_rxn01514_M_cpd00297_c)^1*(kG_M_cpd00009_c*kmc_R_rxn01514_M_cpd00009_c)^1))/((1 + M_cpd00001_c*c/kmc_R_rxn01514_M_cpd00001_c)*(1 + M_cpd00357_c*c/kmc_R_rxn01514_M_cpd00357_c))); R_rxn01514 is "thymidine-triphosphatase irreversible";  // hasProperty ec-code:3.6.1.5 ec-code: 3.6.1.39
    kmc_R_rxn01514_M_cpd00001_c = 1 substance; kmc_R_rxn01514_M_cpd00357_c = 1 substance; kmc_R_rxn01514_M_cpd00067_c = 1 substance; kmc_R_rxn01514_M_cpd00009_c = 1 substance; kmc_R_rxn01514_M_cpd00297_c = 1 substance; vmag_R_rxn01514 = 1 mole_per_second;
  // Irreversibel rapid-equilibrium random order ternary-complex mechanism, two products
  // GENE_ASSOCIATION: PA5321
  // SUBSYSTEM: Pyrimidine metabolism
  // EC Number: 3.6.1.19,3.6.1.23
  // Confidence Level:
  // AUTHORS:
  R_rxn01519: $M_cpd00001_c + $M_cpd00358_c => $M_cpd00012_c + $M_cpd00299_c; vmax_R_rxn01519*M_cpd00358_c*c*M_cpd00001_c*c/(kic_R_rxn01519_M_cpd00001_c*kmc_R_rxn01519_M_cpd00358_c + M_cpd00001_c*c*M_cpd00358_c*c + kmc_R_rxn01519_M_cpd00358_c*M_cpd00001_c*c + kmc_R_rxn01519_M_cpd00001_c*M_cpd00358_c*c); R_rxn01519 is "dUTP diphosphatase";  // hasProperty ec-code:3.6.1.19 ec-code:3.6.1.23
    vmax_R_rxn01519 = 1 mole_per_second; kmc_R_rxn01519_M_cpd00001_c = 1 substance; kmc_R_rxn01519_M_cpd00358_c = 1 substance; kic_R_rxn01519_M_cpd00001_c = 1 substance;
  // Reversibel rapid-equilibrium random order ternary-complex mechanism, two products
  // GENE_ASSOCIATION: PA5331
  // SUBSYSTEM: Pyrimidine metabolism
  // EC Number: 2.4.2.10
  // Confidence Level:
  // AUTHORS:
  R_rxn01362: $M_cpd00012_c + $M_cpd00810_c -> $M_cpd00247_c + $M_cpd00103_c; (vmaf_R_rxn01362/(kic_R_rxn01362_M_cpd00012_c*kmc_R_rxn01362_M_cpd00810_c)*M_cpd00012_c*c*M_cpd00810_c*c - vmar_R_rxn01362/(kic_R_rxn01362_M_cpd00103_c*kmc_R_rxn01362_M_cpd00247_c)*M_cpd00247_c*c*M_cpd00103_c*c)/(1 + M_cpd00012_c*c*M_cpd00810_c*c/(kic_R_rxn01362_M_cpd00012_c*kmc_R_rxn01362_M_cpd00810_c) + M_cpd00012_c*c/kic_R_rxn01362_M_cpd00012_c + M_cpd00247_c*c*M_cpd00103_c*c/(kic_R_rxn01362_M_cpd00103_c*kmc_R_rxn01362_M_cpd00247_c) + M_cpd00810_c*c/kic_R_rxn01362_M_cpd00810_c + M_cpd00103_c*c/kic_R_rxn01362_M_cpd00103_c + M_cpd00247_c*c/kic_R_rxn01362_M_cpd00247_c); R_rxn01362 is "orotate phosphoribosyltransferase";  // hasProperty ec-code:2.4.2.10
    vmaf_R_rxn01362 = 1 mole_per_second; vmar_R_rxn01362 = 1 mole_per_second; kmc_R_rxn01362_M_cpd00810_c = 1 substance; kmc_R_rxn01362_M_cpd00247_c = 1 substance; kic_R_rxn01362_M_cpd00247_c = 1 substance; kic_R_rxn01362_M_cpd00103_c = 1 substance; kic_R_rxn01362_M_cpd00012_c = 1 substance; kic_R_rxn01362_M_cpd00810_c = 1 substance;

  // Unit definitions:
  unit mmol_per_gDW_per_hr = 1e-3 mole / (gram * 2.777778e-4 second);
  unit volume = litre;
  unit substance = mole;
  unit area = metre^2;
  unit mole_per_second = mole / second;
end
